stick_fixed_cruise

#Mach
 0.0

#Iysym   IZsym   Zsym
  0      0     0.0

#Sref    Cref    Bref 	<meters>
17.112      1.74     10.166

#Xref    Yref    Zref   <meters>
2.239696797      0     -0.131189711


#---------------------------------------------------------
SURFACE
main_wing
#Nchordwise  Cspace   Nspanwise  Sspace
10         1.0         20      1.0

YDUPLICATE
0.0


SECTION
#Xle    Yle      Zle      Chord     Ainc  Nspanwise  Sspace
1.6526  0.0    -0.6007    2.186    3.0

SECTION
#Xle    Yle      Zle      Chord     Ainc  Nspanwise  Sspace
1.9209  5.083    0.0685    1.1805    -1.0
NACA
6410


#---------------------------------------------------------
SURFACE
horizontal_stabilizer
#Nchordwise  Cspace   Nspanwise  Sspace
10         1.0         20      1.0

YDUPLICATE
0.0


SECTION
#Xle    Yle      Zle      Chord     Ainc  Nspanwise  Sspace
6.5452  0.0    0.2039    1.1976    0.0

SECTION
#Xle    Yle      Zle      Chord     Ainc  Nspanwise  Sspace
6.644  2.0    0.2039    0.8024    0.0


#---------------------------------------------------------
SURFACE
vertical_stabilizer
#Nchordwise  Cspace   Nspanwise  Sspace
10         1.0         20      -1.1

SECTION
#Xle    Yle      Zle      Chord     Ainc  Nspanwise  Sspace
7.1274  0.0    0.3038    1.0522    0.0

SECTION
#Xle    Yle      Zle      Chord     Ainc  Nspanwise  Sspace
7.6666  0.0    1.7854    0.5177    0.0
