OpenVSP model (file version 5), 12 components.
Geometry view with OpenVSP parameter names; values to 6 digits, angles in degrees, lengths in the model's unit.
Overall bounding box: X_Min=-8.52459 X_Len=16.7958 Y_Min=-9 Y_Len=18 Z_Min=-1.58 Z_Len=4.27005

Fuselage "FuselageGeom"
  location (X Y Z) -8.52459 0 0, rotation 0 0 0
  bounding box size 15 2.44898 2.5841
  Design: Length=15
  cross sections:
    n   XLocPercent  YLocPercent  ZLocPercent  shape
    0   0            0            -0.066       point
    1   0.0256148    0            -0.0656721   ellipse Ellipse_Height=0.65 Ellipse_Width=0.816327
    2   0.0642384    0            -0.0577541   ellipse Ellipse_Height=1.2 Ellipse_Width=1.32653
    3   0.116008     0            -0.045       ellipse Ellipse_Height=1.7 Ellipse_Width=1.73469
    4   0.156096     0            -0.037       ellipse Ellipse_Height=2 Ellipse_Width=1.9898
    5   0.195736     0            -0.029       ellipse Ellipse_Height=2.25 Ellipse_Width=2.14286
    6   0.253097     0            -0.022       ellipse Ellipse_Height=2.5 Ellipse_Width=2.39796
    7   0.388691     0            -0.0163934   ellipse Ellipse_Height=2.5 Ellipse_Width=2.44898
    8   0.550514     0            -0.00819672  ellipse Ellipse_Height=2.12245 Ellipse_Width=2.14286
    9   0.75         0            0.00819672   ellipse Ellipse_Height=1.27347 Ellipse_Width=1.17347
    10  0.862705     0            0.0163934    ellipse Ellipse_Height=0.8 Ellipse_Width=0.714286
    11  1            0            0.0245902    point

Wing "WingGeom"
  location (X Y Z) -3.85246 0 0.901639, rotation 0 0 0
  symmetric about XZ
  bounding box size 3.25 18 0.325189
  totals: TotalSpan=18 TotalProjectedSpan=18 TotalChord=2.125 TotalArea=38.25 TotalAR=8.47059
  root: chord 3.25, twist 0, NACA 4-series Camber=0 CamberLoc=0.2 ThickChord=0.1
  sections:
    n  Span  Root_Chord  Tip_Chord  Area    Sweep  Sweep_Location  Dihedral  Twist  Twist_Location  tip airfoil
    1  9     3.25        1          19.125  -3.5   0.25            0         0      0.25            as above

Wing "WingGeom"
  location (X Y Z) 2.86885 0 0.327869, rotation 90 0 0
  bounding box size 4.79436 0.380221 2.27803
  totals: TotalSpan=2.27803 TotalProjectedSpan=2.27803 TotalChord=2.975 TotalArea=5.74698 TotalAR=0.902982
  root: chord 3.75, twist 0, NACA 4-series Camber=0 CamberLoc=0.2 ThickChord=0.1
  sections:
    n  Span      Root_Chord  Tip_Chord  Area     Sweep    Sweep_Location  Dihedral  Twist  Twist_Location  tip airfoil
    1  0.444696  3.75        3.8        1.67873  20       0.25            0         0      0.25            as above
    2  0.349206  3.8         2.5        1.1      72.6205  0.25            0         0      0.25            as above
    3  1.48413   2.5         1.5        2.96825  48.95    0               0         0      0.25            as above

Wing "WingGeom"
  location (X Y Z) 6.39344 0 2.6, rotation 0 0 0
  symmetric about XZ
  bounding box size 1.87775 9.04762 0.180104
  totals: TotalSpan=9.04762 TotalProjectedSpan=9.04762 TotalChord=1.35 TotalArea=12.2143 TotalAR=6.70194
  root: chord 1.8, twist 0, NACA 4-series Camber=0 CamberLoc=0.2 ThickChord=0.1
  sections:
    n  Span     Root_Chord  Tip_Chord  Area     Sweep    Sweep_Location  Dihedral  Twist  Twist_Location  tip airfoil
    1  4.52381  1.8         0.9        6.10714  9.44732  0.25            0         0      0.25            as above

Pod "PodGeom"
  location (X Y Z) -4.67391 2.3913 0.652174, rotation 0 0 0
  symmetric about XZ
  bounding box size 2 5.18261 0.4
  Design: FineRatio=10 Length=2

Pod "PodGeom", child of "PodGeom"
  location (X Y Z) -4.67391 4.23913 0.652174, rotation 0 0 0
  symmetric about XZ
  bounding box size 2 8.87826 0.4
  Design: FineRatio=10 Length=2

Pod "PodGeom", child of "PodGeom"
  location (X Y Z) -4.34783 5.86957 0.652174, rotation 0 0 0
  symmetric about XZ
  bounding box size 1.5 12.0391 0.3
  Design: FineRatio=10 Length=1.5

Pod "PodGeom", child of "PodGeom"
  location (X Y Z) -4.34783 7.3913 0.652174, rotation 0 0 0
  symmetric about XZ
  bounding box size 1.5 15.0826 0.3
  Design: FineRatio=10 Length=1.5

Disk "Disk"
  location (X Y Z) -4.45652 2.4 0.64, rotation 0 0 0
  symmetric about XZ
  bounding box size 0 6.4 1.6
  Design: Diameter=1.6
  custom script Disk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

Custom "Disk", child of "Disk"
  location (X Y Z) -4.45652 4.24 0.64, rotation 0 0 0
  symmetric about XZ
  bounding box size 0 10.08 1.6
  Design: Diameter=1.6
  custom script Disk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

Custom "Disk", child of "Disk"
  location (X Y Z) -4.45652 5.87043 0.64, rotation 0 0 0
  symmetric about XZ
  bounding box size 0 12.9409 1.2
  Design: Diameter=1.2
  custom script Disk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

Custom "Disk", child of "Disk"
  location (X Y Z) -4.45652 7.39217 0.64, rotation 0 0 0
  symmetric about XZ
  bounding box size 0 15.9843 1.2
  Design: Diameter=1.2
  custom script Disk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
