OpenVSP model (file version 4), 6 components.
Geometry view with OpenVSP parameter names; values to 6 digits, angles in degrees, lengths in the model's unit.
Overall bounding box: X_Min=0 X_Len=51.5 Y_Min=-10.2612 Y_Len=20.5223 Z_Min=-1.5 Z_Len=4.69304

Wing "horizontal_stabilizer"
  location (X Y Z) 45.3 0 3.1, rotation 0 0 0
  symmetric about XZ
  bounding box size 6.2 10.401 0.186073
  totals: TotalSpan=10.4 TotalProjectedSpan=10.4 TotalChord=2.7155 TotalArea=40.5172
  root: chord 6.2, twist 0, NACA 4-series Camber=0 CamberLoc=0.2 ThickChord=0.03
  sections:
    n  Span  Root_Chord  Tip_Chord  Area    Sweep  Sweep_Location  Dihedral  Twist  Twist_Location  tip airfoil
    1  4.6   6.2         2.3        19.55   2.5    0.25            0         0      0.25            as above
    2  0.6   2.3         0.062      0.7086  65     0.25            0         0      0.25            as above

Wing "main_wing"
  location (X Y Z) 21.2 0 0, rotation 0 0 0
  symmetric about XZ
  bounding box size 13.4 20.5223 0.402159
  totals: TotalSpan=20.4 TotalProjectedSpan=20.4 TotalChord=8.29053 TotalArea=146.032
  root: chord 13.4, twist 0, NACA 4-series Camber=0 CamberLoc=0.2 ThickChord=0.03
  sections:
    n  Span  Root_Chord  Tip_Chord  Area     Sweep  Sweep_Location  Dihedral  Twist  Twist_Location  tip airfoil
    1  2.6   13.4        7.8        27.56    54     0.25            0         0      0.25            as above
    2  7.6   7.8         4.16212    45.4561  11     0.25            0         0      0.25            as above

Wing "vertical_stabilizer"
  location (X Y Z) 41 0 0.7, rotation 90 0 0
  bounding box size 10.0819 0.30012 2.45514
  totals: TotalSpan=2.4 TotalProjectedSpan=2.4 TotalChord=6.45 TotalArea=15.48
  root: chord 7.5, twist 0, NACA 4-series Camber=0 CamberLoc=0.2 ThickChord=0.04
  sections:
    n  Span  Root_Chord  Tip_Chord  Area   Sweep  Sweep_Location  Dihedral  Twist  Twist_Location  tip airfoil
    1  2.4   7.5         5.4        15.48  60     0.25            0         0      0.25            as above

Fuselage "turbofan"
  location (X Y Z) 35 -2.3 1.3, rotation 0 0 180
  bounding box size 8.69337 3.58675 3.58675
  Design: Length=9
  cross sections:
    n  XLocPercent  YLocPercent  ZLocPercent  shape
    0  1            0            0            ellipse Ellipse_Height=1.2 Ellipse_Width=1.2
    1  0.25         0            0            ellipse Ellipse_Height=1.4 Ellipse_Width=1.4
    2  0.5          0            0            as above
    3  0.75         0            0            as above
    4  1            0            0            ellipse Ellipse_Height=1.2 Ellipse_Width=1.2

Fuselage "turbofan"
  location (X Y Z) 35 2.3 1.3, rotation 0 0 180
  bounding box size 8.69337 3.58675 3.58675
  Design: Length=9
  cross sections:
    n  XLocPercent  YLocPercent  ZLocPercent  shape
    0  1            0            0            ellipse Ellipse_Height=1.2 Ellipse_Width=1.2
    1  0.25         0            0            ellipse Ellipse_Height=1.4 Ellipse_Width=1.4
    2  0.5          0            0            as above
    3  0.75         0            0            as above
    4  1            0            0            ellipse Ellipse_Height=1.2 Ellipse_Width=1.2

Fuselage "fuselage"
  location (X Y Z) 0 0 0, rotation 0 0 0
  bounding box size 30 2.70416 3
  Design: Length=51.8
  cross sections:
    n  XLocPercent  YLocPercent  ZLocPercent  shape
    0  0            0            -0.01        point
    1  0.336293     0            0            ellipse Ellipse_Height=2.5 Ellipse_Width=2.6
    2  0.473938     0            0            ellipse Ellipse_Height=1.9 Ellipse_Width=2.6
    3  0.683784     0            0            as above
    4  1            0            0.02         point
