OpenVSP model (file version 5), 5 components.
Geometry view with OpenVSP parameter names; values to 6 digits, angles in degrees, lengths in the model's unit.
Overall bounding box: X_Min=0 X_Len=34.9 Y_Min=-16.8519 Y_Len=33.7037 Z_Min=-2.29902 Z_Len=10.6814

Fuselage "FuselageGeom"
  location (X Y Z) 0 0 0, rotation 0 0 0
  bounding box size 34.9 3.5 3.70137
  Design: Length=34.9
  cross sections:
    n   XLocPercent  YLocPercent  ZLocPercent  shape
    0   0            0            0            point
    1   0.01         0            0            ellipse Ellipse_Height=0.9 Ellipse_Width=0.681818
    2   0.02         0            0.001        ellipse Ellipse_Height=1.3 Ellipse_Width=1.25
    3   0.03         0            0.003        ellipse Ellipse_Height=1.65 Ellipse_Width=1.64773
    4   0.04         0            0.005        ellipse Ellipse_Height=1.96 Ellipse_Width=1.93182
    5   0.06         0            0.0108       ellipse Ellipse_Height=2.6 Ellipse_Width=2.5
    6   0.075        0            0.0135       ellipse Ellipse_Height=2.92 Ellipse_Width=2.67045
    7   0.1          0            0.0175       ellipse Ellipse_Height=3.3 Ellipse_Width=3.01136
    8   0.16         0            0.0217391    ellipse Ellipse_Height=3.7 Ellipse_Width=3.5
    9   0.67         0            0.0217       as above
    10  0.73         0            0.026        ellipse Ellipse_Height=3.3 Ellipse_Width=3.5
    11  0.895815     0            0.042        ellipse Ellipse_Height=1.95 Ellipse_Width=2.1
    12  0.937149     0            0.0434783    ellipse Ellipse_Height=1.54 Ellipse_Width=1.8
    13  0.984629     0            0.048        ellipse Ellipse_Height=0.85 Ellipse_Width=0.8
    14  1            0            0.048        point

Wing "WingGeom"
  location (X Y Z) 10.5435 0 -0.652174, rotation 0 0 0
  symmetric about XZ
  bounding box size 11.4928 33.7037 3.39328
  totals: TotalSpan=35 TotalProjectedSpan=33.7037 TotalChord=3.01667 TotalArea=122.915 TotalAR=9.24167
  root: chord 7.3, twist 0, NACA 4-series Camber=0 CamberLoc=0.2 ThickChord=0.1
  sections:
    n  Span  Root_Chord  Tip_Chord  Area    Sweep    Sweep_Location  Dihedral  Twist    Twist_Location  tip airfoil
    1  6.2   7.3         3.75       34.255  24.487   0.25            7.82609   0        0.25            as above
    2  10    3.75        1.45       26      26.5455  0.25            6.41304   0        0.25            as above
    3  1.3   1.45        0.4        1.2025  50       0.25            53.5598   4.71429  0.25            as above

Wing "WingGeom"
  location (X Y Z) 28.8525 0 1.22951, rotation 0 0 0
  symmetric about XZ
  bounding box size 5.389 12.2244 0.922174
  totals: TotalSpan=12.3 TotalProjectedSpan=12.2244 TotalChord=2.41071 TotalArea=29.6518 TotalAR=5.03967
  root: chord 3.55556, twist 0, NACA 4-series Camber=0 CamberLoc=0.2 ThickChord=0.1
  sections:
    n  Span  Root_Chord  Tip_Chord  Area     Sweep  Sweep_Location  Dihedral  Twist  Twist_Location  tip airfoil
    1  6.15  3.55556     1.26587    14.8259  30     0.25            6.35714   0      0.25            as above

Wing "WingGeom"
  location (X Y Z) 25.3279 0 1.31148, rotation 90 0 0
  symmetric about XZ
  bounding box size 8.45931 0.628142 7.07087
  totals: TotalSpan=14.1417 TotalProjectedSpan=14.1417 TotalChord=3.9246 TotalArea=55.5007 TotalAR=3.60335
  root: chord 6.27778, twist 0, NACA 4-series Camber=0 CamberLoc=0.2 ThickChord=0.1
  sections:
    n  Span     Root_Chord  Tip_Chord  Area     Sweep    Sweep_Location  Dihedral  Twist  Twist_Location  tip airfoil
    1  7.07087  6.27778     1.57143    27.7503  38.9286  0.25            0         0      0.25            as above

BodyOfRevolution "BORGeom"
  location (X Y Z) 10.15 -5.43478 -1.08696, rotation 0 0 0
  symmetric about XZ
  bounding box size 3.25837 13.2937 2.42413
  Design: A0=2.88948 Ae=2.76279 Amin=1.50999 AminW=0.336363 Angle=0.373832 Diameter=1.91807 Mode=0
  profile: NACA 4-series Camber=0 CamberLoc=0.2 Chord=3.25841 ThickChord=0.159091
