OpenVSP model (file version 5), 6 components.
Geometry view with OpenVSP parameter names; values to 6 digits, angles in degrees, lengths in the model's unit.
Overall bounding box: X_Min=0 X_Len=73.5069 Y_Min=-33.8817 Y_Len=67.7634 Z_Min=-3.66957 Z_Len=18.8242

Fuselage "FuselageGeom"
  location (X Y Z) 0 0 0, rotation 0 0 0
  bounding box size 70 7.4 8.65652
  Design: Length=70
  cross sections:
    n   XLocPercent  YLocPercent  ZLocPercent  shape
    0   0            0            0.00144892   point
    1   0.00790389   0            0.00182575   ellipse Ellipse_Height=1.53636 Ellipse_Width=2.12455
    2   0.0227929    0            0.00220788   ellipse Ellipse_Height=2.9 Ellipse_Width=3.70091
    3   0.0386857    0            0.00416101   ellipse Ellipse_Height=4.05 Ellipse_Width=4.8
    4   0.0647144    0            0.00832201   ellipse Ellipse_Height=5.63 Ellipse_Width=6.07409
    5   0.0761066    0            0.0119156    ellipse Ellipse_Height=6.56 Ellipse_Width=6.45
    6   0.0893752    0            0.0132473    ellipse Ellipse_Height=7.07 Ellipse_Width=6.87273
    7   0.10569      0            0.0139266    ellipse Ellipse_Height=7.50455 Ellipse_Width=7.26364
    8   0.138587     0            0.0123981    ellipse Ellipse_Height=7.8 Ellipse_Width=7.4
    9   0.59         0            0.00543478   ellipse Ellipse_Height=8.1 Ellipse_Width=7.4
    10  0.614621     0            0.0061672    ellipse Ellipse_Height=8 Ellipse_Width=7.4
    11  0.690672     0            0.0149669    ellipse Ellipse_Height=7.5 Ellipse_Width=7.4
    12  0.775237     0            0.0244565    ellipse Ellipse_Height=6.55 Ellipse_Width=7.2
    13  0.85018      0            0.0313349    ellipse Ellipse_Height=5.16 Ellipse_Width=5.8
    14  0.923077     0            0.037        ellipse Ellipse_Height=3.25 Ellipse_Width=3.8
    15  0.96625      0            0.039        ellipse Ellipse_Height=1.67273 Ellipse_Width=2
    16  1            0            0.0407609    point

Wing "WingGeom", child of "FuselageGeom"
  location (X Y Z) 20 0 3.91304, rotation 0 0 0
  symmetric about XZ
  bounding box size 22.0207 67.7634 2.95614
  totals: TotalSpan=67.89 TotalProjectedSpan=67.7634 TotalChord=8.53331 TotalArea=565.333 TotalAR=8.12242
  root: chord 14, twist 0, NACA 4-series Camber=0 CamberLoc=0.2 ThickChord=0.1
  sections:
    n  Span     Root_Chord  Tip_Chord  Area     Sweep  Sweep_Location  Dihedral  Twist  Twist_Location  tip airfoil
    1  15.6183  14          8.23329    173.623  28.4   0               -3.5      0      0.25            as above
    2  18.3267  8.23329     3.66667    109.043  28.4   0               -3.5      0      0.25            as above

Wing "WingGeom", child of "WingGeom"
  location (X Y Z) 64.6 0 14.7826, rotation 0 0 0
  symmetric about XZ
  bounding box size 8.31784 20.4875 0.797975
  totals: TotalSpan=20.5 TotalProjectedSpan=20.4875 TotalChord=4.4 TotalArea=90.2 TotalAR=4.65342
  root: chord 6.4, twist 0, NACA 4-series Camber=0 CamberLoc=0.2 ThickChord=0.1
  sections:
    n  Span   Root_Chord  Tip_Chord  Area  Sweep  Sweep_Location  Dihedral  Twist  Twist_Location  tip airfoil
    1  10.25  6.4         2.4        45.1  30     0               -2        0      0.25            as above

Wing "WingGeom", child of "WingGeom"
  location (X Y Z) 58.5 0 3.58696, rotation 90 0 0
  symmetric about XZ
  bounding box size 15.0069 0.950551 11.5677
  totals: TotalSpan=23.1354 TotalProjectedSpan=23.1354 TotalChord=8.77865 TotalArea=204.706 TotalAR=2.61472
  root: chord 9.5, twist 0, NACA 4-series Camber=0 CamberLoc=0.2 ThickChord=0.1
  sections:
    n  Span     Root_Chord  Tip_Chord  Area     Sweep     Sweep_Location  Dihedral  Twist  Twist_Location  tip airfoil
    1  9        9.5         8.30729    80.1328  35.9091   0               0         0      0.25            as above
    2  2.56771  8.30729     9          22.22    -11.2386  0               0         0      0.25            as above

Custom "Duct"
  location (X Y Z) 23.2143 11.2 0.6, rotation 0 0 0
  symmetric about XZ
  bounding box size 3 25.5002 3.14246
  Design: Camber=0 CamberLoc=0.2 Chord=3 Height=2.5 InvertFlag=0 Shape=0 ThickChord=0.2 Width=2.5
  custom script Duct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

Custom "Duct", child of "Duct"
  location (X Y Z) 26.4286 17.6 0.2, rotation 0 0 0
  symmetric about XZ
  bounding box size 3 38.3002 3.14246
  Design: Camber=0 CamberLoc=0.2 Chord=3 Height=2.5 InvertFlag=0 Shape=0 ThickChord=0.2 Width=2.5
  custom script Duct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
