OpenVSP model (file version 5), 5 components.
Geometry view with OpenVSP parameter names; values to 6 digits, angles in degrees, lengths in the model's unit.
Overall bounding box: X_Min=0 X_Len=32.5278 Y_Min=-11.5696 Y_Len=23.1392 Z_Min=-0.742641 Z_Len=5.89264

Fuselage "FuselageGeom"
  location (X Y Z) 0 0 0, rotation 0 0 0
  bounding box size 29.68 2.69 2.69
  Design: Length=29.68
  cross sections:
    n   XLocPercent  YLocPercent  ZLocPercent   shape
    0   0            0            -0.002        point
    1   0.012106     0            -0.000673854  ellipse Ellipse_Height=0.52 Ellipse_Width=0.64
    2   0.024212     0            0.001         ellipse Ellipse_Height=0.9 Ellipse_Width=1.1
    3   0.039606     0            0.00387466    ellipse Ellipse_Height=1.3 Ellipse_Width=1.6
    4   0.055        0            0.0074124     ellipse Ellipse_Height=1.6 Ellipse_Width=1.95
    5   0.08         0            0.0147        ellipse Ellipse_Height=2.15 Ellipse_Width=2.35
    6   0.101115     0            0.0194929     ellipse Ellipse_Height=2.46 Ellipse_Width=2.56
    7   0.122229     0            0.022         ellipse Ellipse_Height=2.6 Ellipse_Width=2.66
    8   0.142663     0            0.023         ellipse Ellipse_Height=2.69 Ellipse_Width=2.69
    9   0.75         0            0.023         as above
    10  0.83         0            0.027         ellipse Ellipse_Height=2.3 Ellipse_Width=2.35
    11  0.966739     0            0.033         ellipse Ellipse_Height=0.95 Ellipse_Width=0.6
    12  1            0            0.033         ellipse Ellipse_Height=0.3 Ellipse_Width=0.3

Wing "WingGeom", child of "FuselageGeom"
  location (X Y Z) 13.35 0 -0.5, rotation 0 0 0
  symmetric about XZ
  bounding box size 7.45495 23.1392 2.11443
  totals: TotalSpan=25.89 TotalProjectedSpan=23.1392 TotalChord=3.00625 TotalArea=72.719 TotalAR=7.36287
  root: chord 4.85, twist 0, NACA 4-series Camber=0 CamberLoc=0.2 ThickChord=0.1
  sections:
    n  Span   Root_Chord  Tip_Chord  Area     Sweep  Sweep_Location  Dihedral  Twist  Twist_Location  tip airfoil
    1  1.345  4.85        4.85       6.52325  0      0.25            0         0      0.25            as above
    2  3.35   4.85        3          13.1487  25     0.25            2         0      0.25            as above
    3  6.75   3           1.5        15.1875  27     0.25            2         0      0.25            as above
    4  1.5    1.5         0.5        1.5      30     0.25            85        0      0.25            as above

Wing "WingGeom", child of "WingGeom"
  location (X Y Z) 25 0 1.25, rotation 90 0 0
  bounding box size 6.06132 0.450261 3.9
  totals: TotalSpan=3.9 TotalProjectedSpan=3.9 TotalChord=3.54167 TotalArea=12.425 TotalAR=1.22414
  root: chord 4, twist 0, NACA 4-series Camber=0 CamberLoc=0.2 ThickChord=0.1
  sections:
    n  Span  Root_Chord  Tip_Chord  Area   Sweep  Sweep_Location  Dihedral  Twist  Twist_Location  tip airfoil
    1  1     4           4.5        4.25   5      0.25            0         0      0.25            as above
    2  0.5   4.5         3          1.875  70     0.25            0         0      0.25            as above
    3  2.4   3           2.25       6.3    38     0.25            0         0      0.25            as above

Wing "WingGeom", child of "WingGeom"
  location (X Y Z) 28.5 0 4.37, rotation 0 0 0
  symmetric about XZ
  bounding box size 4.02779 8.52407 0.448286
  totals: TotalSpan=8.54 TotalProjectedSpan=8.52407 TotalChord=1.875 TotalArea=16.0125 TotalAR=4.53769
  root: chord 2.5, twist 0, NACA 4-series Camber=0 CamberLoc=0.2 ThickChord=0.1
  sections:
    n  Span  Root_Chord  Tip_Chord  Area     Sweep  Sweep_Location  Dihedral  Twist  Twist_Location  tip airfoil
    1  4.27  2.5         1.25       8.00625  30     0.25            -3.5      0      0.25            as above

Fuselage "FuselageGeom"
  location (X Y Z) 21.5 -2.2 1.45, rotation 0 0 0
  symmetric about XZ
  bounding box size 3.9 5.95 1.55
  Design: Length=3.9
  cross sections:
    n  XLocPercent  YLocPercent  ZLocPercent  shape
    0  0            0            0            circle Circle_Diameter=1.3
    1  0.127717     0            0            circle Circle_Diameter=1.55
    2  0.551394     0            0            as above
    3  0.551394     0            0            circle Circle_Diameter=1.25
    4  0.826087     0            0            circle Circle_Diameter=0.75
    5  0.826087     0            0            circle Circle_Diameter=0.6
    6  1            0            0            point
