OpenVSP model (file version 5), 19 components.
Geometry view with OpenVSP parameter names; values to 6 digits, angles in degrees, lengths in the model's unit.
Overall bounding box: X_Min=0 X_Len=31.68 Y_Min=-12.1839 Y_Len=24.3677 Z_Min=-1.86713 Z_Len=9.85825

Fuselage "Fuselage"
  location (X Y Z) 0 0 0, rotation 0 0 0
  bounding box size 31.68 3.01 3.41315
  Design: Length=31.68
  cross sections:
    n  XLocPercent  YLocPercent  ZLocPercent  shape
    0  0            0            0            point
    1  0.15         0            0.03         ellipse Ellipse_Height=3.35 Ellipse_Width=3.01
    2  0.632        0            0.03         as above
    3  1            0            0.06         point

Wing "Wing"
  location (X Y Z) 10.8824 0 -0.5, rotation 0 2.2 0
  symmetric about XZ
  bounding box size 7.94308 24.3677 2.48395
  totals: TotalSpan=26 TotalProjectedSpan=24.3387 TotalChord=2.26288 TotalArea=70.0687 TotalAR=8.45419
  root: chord 5.45, twist 0, NACA 4-series Camber=0 CamberLoc=0.2 ThickChord=0.1
  sections:
    n  Span  Root_Chord  Tip_Chord  Area     Sweep  Sweep_Location  Dihedral  Twist  Twist_Location  tip airfoil
    1  4.9   5.45        2.91364    20.4909  28     0               7         -1     0.25            as above
    2  7.1   2.91364     1          13.8934  28     0               7         -1     0.25            as above
    3  1     1           0.3        0.65     45     0.25            75        0      0.25            as above

Wing "HT"
  location (X Y Z) 26 0 1.9, rotation 0 0 0
  symmetric about XZ
  bounding box size 4.81581 10 0.353605
  totals: TotalSpan=10 TotalProjectedSpan=10 TotalChord=2.325 TotalArea=23.25 TotalAR=4.30108
  root: chord 3.534, twist 0, NACA 4-series Camber=0 CamberLoc=0.2 ThickChord=0.1
  sections:
    n  Span  Root_Chord  Tip_Chord  Area    Sweep  Sweep_Location  Dihedral  Twist  Twist_Location  tip airfoil
    1  5     3.534       1.116      11.625  36.5   0               0         0      0.25            as above

Wing "VT"
  location (X Y Z) 21.9 0 2.36471, rotation 90 0 0
  bounding box size 9.19047 0.773371 5.62641
  totals: TotalSpan=5.62641 TotalProjectedSpan=5.62641 TotalChord=4.40128 TotalArea=19.1982 TotalAR=1.64893
  root: chord 7.72923, twist 0, NACA 4-series Camber=0 CamberLoc=0.2 ThickChord=0.1
  sections:
    n  Span     Root_Chord  Tip_Chord  Area     Sweep  Sweep_Location  Dihedral  Twist  Twist_Location  tip airfoil
    1  1.02641  7.72923     4.18795    6.11595  75     0               0         0      0.25            as above
    2  4.6      4.18795     1.5        13.0823  40     0               0         0      0.25            as above

Custom "Turbofan"
  location (X Y Z) 11.7 4.2 -0.95, rotation 0 0 0
  bounding box size 2.75075 1.80962 1.83427
  Design: Camber=0 CamberLoc=0.2 Chord=2.75075 Height=1.5 InvertFlag=0 Shape=0 ThickChord=0.1125 Width=1.5
  custom script Duct0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

Wing "Turbofan_pylon", child of "Turbofan"
  location (X Y Z) 11.189 4.2 -1.06, rotation 90 0 0; relative location -0.511 0 -0.11, rotation 90 0 0
  bounding box size 3.74451 0.320124 1
  totals: TotalSpan=1 TotalProjectedSpan=1 TotalChord=1.6 TotalArea=1.6 TotalAR=0.625
  root: chord 1.6, twist 0, NACA 4-series Camber=0 CamberLoc=0.2 ThickChord=0.2
  sections:
    n  Span  Root_Chord  Tip_Chord  Area  Sweep  Sweep_Location  Dihedral  Twist  Twist_Location  tip airfoil
    1  1     1.6         1.6        1.6   65     0               0         0      0.25            as above

Fuselage "Spinners", child of "Turbofan"
  location (X Y Z) 10.8304 4.2 -0.95, rotation 0 0 0; relative location -0.869565 0 0, rotation 0 0 0
  symmetric about XZ
  bounding box size 0.3 0.35 0.35
  Design: Length=0.3
  cross sections:
    n  XLocPercent  YLocPercent  ZLocPercent  shape
    0  0            0            0            point
    1  0.51087      0            0            circle Circle_Diameter=0.35
    2  1            0            0            as above
    3  1            0            0            point

Wing "Fan_blade", child of "Turbofan"
  location (X Y Z) 11.01 4.2 -0.85, rotation 90 -20 0; relative location -0.69 0 0.1, rotation 90 -20 0
  15 copies around X
  bounding box size 0.150419 1.47942 1.47885
  totals: TotalSpan=1.24 TotalProjectedSpan=1.24 TotalChord=0.2 TotalArea=0.248 TotalAR=6.2
  root: chord 0.1, twist 0, NACA 4-series Camber=0 CamberLoc=0.2 ThickChord=0.1
  sections:
    n  Span  Root_Chord  Tip_Chord  Area   Sweep     Sweep_Location  Dihedral  Twist  Twist_Location  tip airfoil
    1  0.62  0.1         0.3        0.124  -8.16667  0               0         -40    0.25            NACA 4-series Camber=0 CamberLoc=0.2 ThickChord=0.0416667

Fuselage "Nozzle", child of "Turbofan"
  location (X Y Z) 11.1565 4.2 -0.95, rotation 0 0 0; relative location -0.543478 0 0, rotation 0 0 0
  bounding box size 2.85 1.2 1.2
  Design: Length=2.85
  cross sections:
    n  XLocPercent  YLocPercent  ZLocPercent  shape
    0  0            0            0            circle Circle_Diameter=1
    1  0.538043     0            0            circle Circle_Diameter=1.2
    2  1            0            0            point

Custom "Turbofan"
  location (X Y Z) 11.7 -4.2 -0.95, rotation 0 0 0
  bounding box size 2.75075 1.80962 1.83427
  Design: Camber=0 CamberLoc=0.2 Chord=2.75075 Height=1.5 InvertFlag=0 Shape=0 ThickChord=0.1125 Width=1.5
  custom script Duct0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

Wing "Turbofan_pylon", child of "Turbofan"
  location (X Y Z) 11.1888 -4.2 -1.06, rotation 90 0 0; relative location -0.511204 0 -0.11, rotation 90 0 0
  bounding box size 3.74451 0.320124 1
  totals: TotalSpan=1 TotalProjectedSpan=1 TotalChord=1.6 TotalArea=1.6 TotalAR=0.625
  root: chord 1.6, twist 0, NACA 4-series Camber=0 CamberLoc=0.2 ThickChord=0.2
  sections:
    n  Span  Root_Chord  Tip_Chord  Area  Sweep  Sweep_Location  Dihedral  Twist  Twist_Location  tip airfoil
    1  1     1.6         1.6        1.6   65     0               0         0      0.25            as above

Fuselage "Spinners", child of "Turbofan"
  location (X Y Z) 10.8304 -4.2 -0.95, rotation 0 0 0; relative location -0.869565 0 0, rotation 0 0 0
  symmetric about XZ
  bounding box size 0.3 0.35 0.35
  Design: Length=0.3
  cross sections:
    n  XLocPercent  YLocPercent  ZLocPercent  shape
    0  0            0            0            point
    1  0.51087      0            0            circle Circle_Diameter=0.35
    2  1            0            0            as above
    3  1            0            0            point

Wing "Fan_blade", child of "Turbofan"
  location (X Y Z) 11.01 -4.2 -0.85, rotation 90 -20 0; relative location -0.69 0 0.1, rotation 90 -20 0
  15 copies around X
  bounding box size 0.150419 1.47942 1.47885
  totals: TotalSpan=1.24 TotalProjectedSpan=1.24 TotalChord=0.2 TotalArea=0.248 TotalAR=6.2
  root: chord 0.1, twist 0, NACA 4-series Camber=0 CamberLoc=0.2 ThickChord=0.1
  sections:
    n  Span  Root_Chord  Tip_Chord  Area   Sweep     Sweep_Location  Dihedral  Twist  Twist_Location  tip airfoil
    1  0.62  0.1         0.3        0.124  -8.16667  0               0         -40    0.25            NACA 4-series Camber=0 CamberLoc=0.2 ThickChord=0.0416667

Fuselage "Nozzle", child of "Turbofan"
  location (X Y Z) 11.1565 -4.2 -0.95, rotation 0 0 0; relative location -0.543478 0 0, rotation 0 0 0
  bounding box size 2.85 1.2 1.2
  Design: Length=2.85
  cross sections:
    n  XLocPercent  YLocPercent  ZLocPercent  shape
    0  0            0            0            circle Circle_Diameter=1
    1  0.538043     0            0            circle Circle_Diameter=1.2
    2  1            0            0            point

Wing "Fuel_Tank"
  location (X Y Z) 12.2826 1.73913 -0.402609, rotation 0 0 0
  symmetric about XZ
  bounding box size 5.00003 17.5704 1.03051
  totals: TotalSpan=14.1792 TotalProjectedSpan=14.0922 TotalChord=2.22269 TotalArea=31.3608 TotalAR=6.33242
  root: chord 3.72152, twist 0, NACA 4-series Camber=0 CamberLoc=0.2 ThickChord=0.1
  sections:
    n  Span     Root_Chord  Tip_Chord  Area     Sweep    Sweep_Location  Dihedral  Twist  Twist_Location  tip airfoil
    1  3.48023  3.72152     1.92577    9.82692  28.9091  0               7.09091   0      0.25            as above
    2  3.60938  1.92577     1.31771    5.85347  26       0               5.54545   0      0.25            as above

Stack "Wing_Fuel_Line"
  location (X Y Z) 12.1739 4.18478 -0.869565, rotation 0 -24.7824 0
  symmetric about XZ
  bounding box size 1.67639 8.56957 0.916853
  cross sections:
    n  XDelta  YDelta  ZDelta  shape
    0  0       0       0       circle Circle_Diameter=0.2
    1  1.7541  0       0       as above

Wing "Wing_Fuel_Tank"
  location (X Y Z) 12.2826 1.73913 -0.402609, rotation 0 0 0
  symmetric about XZ
  bounding box size 5.00003 17.5704 1.03051
  totals: TotalSpan=14.1792 TotalProjectedSpan=14.0922 TotalChord=2.22269 TotalArea=31.3608 TotalAR=6.33242
  root: chord 3.72152, twist 0, NACA 4-series Camber=0 CamberLoc=0.2 ThickChord=0.1
  sections:
    n  Span     Root_Chord  Tip_Chord  Area     Sweep    Sweep_Location  Dihedral  Twist  Twist_Location  tip airfoil
    1  3.48023  3.72152     1.92577    9.82692  28.9091  0               7.09091   0      0.25            as above
    2  3.60938  1.92577     1.31771    5.85347  26       0               5.54545   0      0.25            as above

Wing "Central_Fuel_Tank"
  location (X Y Z) 12.2826 0 -0.402609, rotation 0 0 0
  symmetric about XZ
  bounding box size 3.72152 3.06559 0.563041
  totals: TotalSpan=3.08922 TotalProjectedSpan=3.06559 TotalChord=3.72152 TotalArea=11.4966 TotalAR=0.817447
  root: chord 3.72152, twist 0, NACA 4-series Camber=0 CamberLoc=0.2 ThickChord=0.1
  sections:
    n  Span     Root_Chord  Tip_Chord  Area     Sweep  Sweep_Location  Dihedral  Twist  Twist_Location  tip airfoil
    1  1.54461  3.72152     3.72152    5.74829  0      0               7.09091   0      0.25            as above

Stack "Central_Fuel_Line"
  location (X Y Z) 13.587 0 -0.217391, rotation 0 0 90
  symmetric about XZ
  bounding box size 0.2 3.5082 0.2
  cross sections:
    n  XDelta  YDelta  ZDelta  shape
    0  0       0       0       circle Circle_Diameter=0.2
    1  1.7541  0       0       as above
