OpenVSP model (file version 5), 36 components.
Geometry view with OpenVSP parameter names; values to 6 digits, angles in degrees, lengths in the model's unit.
Overall bounding box: X_Min=-0.109 X_Len=7.02783 Y_Min=-6.5082 Y_Len=13.0164 Z_Min=-0.463029 Z_Len=4.25323

Wing "main_wing"
  location (X Y Z) 1.778 0 1, rotation 0 0 0
  symmetric about XZ
  bounding box size 1.57 9.81406 0.527833
  totals: TotalSpan=9.78264 TotalProjectedSpan=9.736 TotalChord=1.06744 TotalArea=10.3976 TotalAR=9.11652
  root: chord 1.57, twist 0, NACA 4-series Camber=0 CamberLoc=0.2 ThickChord=0.15
  sections:
    n  Span     Root_Chord  Tip_Chord  Area     Sweep  Sweep_Location  Dihedral  Twist  Twist_Location  tip airfoil
    1  2.39647  1.57        1.01987    3.10328  0      0.25            8         0      0.25            as above
    2  2.49485  1.01987     0.659997   2.09551  0      0.25            0         0      0.25            NACA 4-series Camber=0 CamberLoc=0.2 ThickChord=0.12

Wing "v_tail"
  location (X Y Z) 5.167 0 0.47, rotation 0 0 0
  symmetric about XZ
  bounding box size 1.75183 3.65204 1.94384
  totals: TotalSpan=5.09117 TotalProjectedSpan=3.6 TotalChord=0.864 TotalArea=4.39877 TotalAR=2.94628
  root: chord 1.193, twist 0, NACA 4-series Camber=0 CamberLoc=0.2 ThickChord=0.15
  sections:
    n  Span     Root_Chord  Tip_Chord  Area     Sweep  Sweep_Location  Dihedral  Twist  Twist_Location  tip airfoil
    1  2.54558  1.193       0.535      2.19938  22.46  0.25            45        0      0.25            as above

Propeller "PropGeom"
  location (X Y Z) 0.208 -2.392 1.195, rotation 0 0 0
  bounding box size 0.144343 3.0164 3.0164
  Design: Diameter=3 NumBlade=4 Beta34=14.9105 UseBeta34Flag=1 Feather=-0.00325724 Rotate=0 Precone=0 ReverseFlag=0 FoldAngle=0 PropMode=0 AF=100.394 CLi=0.69888 Chord=0.163069 Solidity=0.207626 ConstructXoC=0.5 FeatherAxisXoC=0.5 FeatherOffsetXoC=0
  cross sections:
    n  RadiusFrac  shape
    0  0.15        NACA 16-series Chord=0.299787 IdealCl=0.7 ThickChord=0.120315
    1  1           NACA 16-series Chord=0.136725 IdealCl=0.7 ThickChord=0.120315
  Chord along r/R (PCHIP): 0.15: 0.199858, 0.1925: 0.200198, 0.235: 0.200304, 0.2775: 0.199227, 0.32: 0.197839, 0.3625: 0.195559, 0.405: 0.192664, 0.4475: 0.189213, 0.49: 0.184802, 0.5325: 0.17996, 0.575: 0.174284, 0.6175: 0.167878, 0.66: 0.160913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
  Twist along r/R (PCHIP): 0.15: 28.0533, 0.1925: 27.2428, 0.235: 26.4296, 0.2775: 25.5968, 0.32: 24.7573, 0.3625: 23.8985, 0.405: 23.0233, 0.4475: 22.1334, 0.49: 21.2124, 0.5325: 20.2758, 0.575: 19.3065, 0.6175: 18.3024, 0.66: 17.2687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
  Sweep along r/R (PCHIP): 0.15: 0, 0.1925: 0.0004416, 0.235: 0.0004746, 0.2775: -0.0005684, 0.32: -0.0015773, 0.3625: -0.0029646, 0.405: -0.0044404, 0.4475: -0.0059466, 0.49: -0.0076817, 0.5325: -0.0093416, 0.575: -0.0111188, 0.6175: -0.0129465, 0.66: -0.0147506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
  Thick along r/R (PCHIP): 0.15: 0.120315, 0.1925: 0.120315, 0.235: 0.120315, 0.2775: 0.120315, 0.32: 0.120315, 0.3625: 0.120315, 0.405: 0.120315, 0.4475: 0.120315, 0.49: 0.120315, 0.5325: 0.120315, 0.575: 0.120315, 0.6175: 0.120315, 0.66: 0.120315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
  CLI along r/R (PCHIP): 0.15: 0.7, 0.1925: 0.7, 0.235: 0.7, 0.2775: 0.7, 0.32: 0.7, 0.3625: 0.7, 0.405: 0.7, 0.4475: 0.7, 0.49: 0.7, 0.5325: 0.7, 0.575: 0.7, 0.6175: 0.7, 0.66: 0.7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

Propeller "PropGeom"
  location (X Y Z) 0.208 2.392 1.195, rotation 0 0 0
  bounding box size 0.144343 3.0164 3.0164
  Design: Diameter=3 NumBlade=4 Beta34=14.9105 UseBeta34Flag=1 Feather=-0.00325724 Rotate=0 Precone=0 ReverseFlag=0 FoldAngle=0 PropMode=0 AF=100.394 CLi=0.69888 Chord=0.163069 Solidity=0.207626 ConstructXoC=0.5 FeatherAxisXoC=0.5 FeatherOffsetXoC=0
  cross sections:
    n  RadiusFrac  shape
    0  0.15        NACA 16-series Chord=0.299787 IdealCl=0.7 ThickChord=0.120315
    1  1           NACA 16-series Chord=0.136725 IdealCl=0.7 ThickChord=0.120315
  blade curves as in "PropGeom"

Propeller "PropGeom"
  location (X Y Z) 1.505 5 1.32, rotation 0 0 0
  bounding box size 0.144343 3.0164 3.0164
  Design: Diameter=3 NumBlade=4 Beta34=14.9105 UseBeta34Flag=1 Feather=-0.00325724 Rotate=0 Precone=0 ReverseFlag=0 FoldAngle=0 PropMode=0 AF=100.394 CLi=0.69888 Chord=0.163069 Solidity=0.207626 ConstructXoC=0.5 FeatherAxisXoC=0.5 FeatherOffsetXoC=0
  cross sections:
    n  RadiusFrac  shape
    0  0.15        NACA 16-series Chord=0.299787 IdealCl=0.7 ThickChord=0.120315
    1  1           NACA 16-series Chord=0.136725 IdealCl=0.7 ThickChord=0.120315
  blade curves as in "PropGeom"

Propeller "PropGeom"
  location (X Y Z) 1.505 -5 1.32, rotation 0 0 0
  bounding box size 0.144343 3.0164 3.0164
  Design: Diameter=3 NumBlade=4 Beta34=14.9105 UseBeta34Flag=1 Feather=-0.00325724 Rotate=0 Precone=0 ReverseFlag=0 FoldAngle=0 PropMode=0 AF=100.394 CLi=0.69888 Chord=0.163069 Solidity=0.207626 ConstructXoC=0.5 FeatherAxisXoC=0.5 FeatherOffsetXoC=0
  cross sections:
    n  RadiusFrac  shape
    0  0.15        NACA 16-series Chord=0.299787 IdealCl=0.7 ThickChord=0.120315
    1  1           NACA 16-series Chord=0.136725 IdealCl=0.7 ThickChord=0.120315
  blade curves as in "PropGeom"

Propeller "PropGeom"
  location (X Y Z) 5.318 1.848 2.282, rotation 0 0 0
  bounding box size 0.144343 3.0164 3.0164
  Design: Diameter=3 NumBlade=4 Beta34=14.9105 UseBeta34Flag=1 Feather=-0.00325724 Rotate=0 Precone=0 ReverseFlag=0 FoldAngle=0 PropMode=0 AF=100.394 CLi=0.69888 Chord=0.163069 Solidity=0.207626 ConstructXoC=0.5 FeatherAxisXoC=0.5 FeatherOffsetXoC=0
  cross sections:
    n  RadiusFrac  shape
    0  0.15        NACA 16-series Chord=0.299787 IdealCl=0.7 ThickChord=0.120315
    1  1           NACA 16-series Chord=0.136725 IdealCl=0.7 ThickChord=0.120315
  blade curves as in "PropGeom"

Propeller "PropGeom"
  location (X Y Z) 5.318 -1.848 2.282, rotation 0 0 0
  bounding box size 0.144343 3.0164 3.0164
  Design: Diameter=3 NumBlade=4 Beta34=14.9105 UseBeta34Flag=1 Feather=-0.00325724 Rotate=0 Precone=0 ReverseFlag=0 FoldAngle=0 PropMode=0 AF=100.394 CLi=0.69888 Chord=0.163069 Solidity=0.207626 ConstructXoC=0.5 FeatherAxisXoC=0.5 FeatherOffsetXoC=0
  cross sections:
    n  RadiusFrac  shape
    0  0.15        NACA 16-series Chord=0.299787 IdealCl=0.7 ThickChord=0.120315
    1  1           NACA 16-series Chord=0.136725 IdealCl=0.7 ThickChord=0.120315
  blade curves as in "PropGeom"

Stack "lift_rotor_nacelle_1"
  location (X Y Z) 1.305 5 1.32, rotation 0 0 0
  bounding box size 1.5 0.5 0.5
  cross sections:
    n  XDelta  YDelta  ZDelta  shape
    0  0       0       0       point
    1  0.15    0       0       ellipse Ellipse_Height=0.3 Ellipse_Width=0.3
    2  0.225   0       0       ellipse Ellipse_Height=0.45 Ellipse_Width=0.45
    3  0.375   0       0       ellipse Ellipse_Height=0.5 Ellipse_Width=0.5
    4  0.6     0       0       ellipse Ellipse_Height=0.3 Ellipse_Width=0.3
    5  0.15    0       0       point

Stack "lift_rotor_nacelle_2"
  location (X Y Z) 1.305 -5 1.32, rotation 0 0 0
  bounding box size 1.5 0.5 0.5
  cross sections:
    n  XDelta  YDelta  ZDelta  shape
    0  0       0       0       point
    1  0.15    0       0       ellipse Ellipse_Height=0.3 Ellipse_Width=0.3
    2  0.225   0       0       ellipse Ellipse_Height=0.45 Ellipse_Width=0.45
    3  0.375   0       0       ellipse Ellipse_Height=0.5 Ellipse_Width=0.5
    4  0.6     0       0       ellipse Ellipse_Height=0.3 Ellipse_Width=0.3
    5  0.15    0       0       point

Stack "lift_rotor_nacelle_3"
  location (X Y Z) 5.217 -1.848 2.282, rotation 0 0 0
  bounding box size 1.5 0.5 0.5
  cross sections:
    n  XDelta  YDelta  ZDelta  shape
    0  0       0       0       point
    1  0.15    0       0       ellipse Ellipse_Height=0.3 Ellipse_Width=0.3
    2  0.225   0       0       ellipse Ellipse_Height=0.45 Ellipse_Width=0.45
    3  0.375   0       0       ellipse Ellipse_Height=0.5 Ellipse_Width=0.5
    4  0.6     0       0       ellipse Ellipse_Height=0.3 Ellipse_Width=0.3
    5  0.15    0       0       point

Stack "lift_rotor_nacelle_4"
  location (X Y Z) 5.217 1.848 2.282, rotation 0 0 0
  bounding box size 1.5 0.5 0.5
  cross sections:
    n  XDelta  YDelta  ZDelta  shape
    0  0       0       0       point
    1  0.15    0       0       ellipse Ellipse_Height=0.3 Ellipse_Width=0.3
    2  0.225   0       0       ellipse Ellipse_Height=0.45 Ellipse_Width=0.45
    3  0.375   0       0       ellipse Ellipse_Height=0.5 Ellipse_Width=0.5
    4  0.6     0       0       ellipse Ellipse_Height=0.3 Ellipse_Width=0.3
    5  0.15    0       0       point

Stack "propeller_nacelle_1"
  location (X Y Z) -0.109 -2.392 1.195, rotation 0 0 0
  bounding box size 3 0.5 0.5
  cross sections:
    n  XDelta  YDelta  ZDelta  shape
    0  0       0       0       point
    1  0.3     0       0       ellipse Ellipse_Height=0.3 Ellipse_Width=0.3
    2  0.45    0       0       ellipse Ellipse_Height=0.45 Ellipse_Width=0.45
    3  0.75    0       0       ellipse Ellipse_Height=0.5 Ellipse_Width=0.5
    4  1.2     0       0       ellipse Ellipse_Height=0.3 Ellipse_Width=0.3
    5  0.3     0       0       point

Stack "propeller_nacelle_2"
  location (X Y Z) -0.109 2.392 1.195, rotation 0 0 0
  bounding box size 3 0.5 0.5
  cross sections:
    n  XDelta  YDelta  ZDelta  shape
    0  0       0       0       point
    1  0.3     0       0       ellipse Ellipse_Height=0.3 Ellipse_Width=0.3
    2  0.45    0       0       ellipse Ellipse_Height=0.45 Ellipse_Width=0.45
    3  0.75    0       0       ellipse Ellipse_Height=0.5 Ellipse_Width=0.5
    4  1.2     0       0       ellipse Ellipse_Height=0.3 Ellipse_Width=0.3
    5  0.3     0       0       point

Fuselage "fuselage"
  location (X Y Z) 0 0 0, rotation 0 0 0
  bounding box size 6.46 1.28245 1.62953
  negative volume
  Design: Length=6.46
  cross sections:
    n  XLocPercent  YLocPercent  ZLocPercent  shape
    0  0            0            0            point
    1  0.026        0            0.00849      ellipse Ellipse_Height=0.481 Ellipse_Width=0.553
    2  0.074        0            0.02874      ellipse Ellipse_Height=1 Ellipse_Width=0.912
    3  0.161        0            0.04348      ellipse Ellipse_Height=1.41 Ellipse_Width=1.174
    4  0.284        0            0.05435      ellipse Ellipse_Height=1.62 Ellipse_Width=1.276
    5  0.531        0            0.051        ellipse Ellipse_Height=1.409 Ellipse_Width=1.121
    6  0.651        0            0.05636      ellipse Ellipse_Height=1.11 Ellipse_Width=0.833
    7  0.773        0            0.06149      ellipse Ellipse_Height=0.78 Ellipse_Width=0.512
    8  1            0            0.07352      ellipse Ellipse_Height=0.195 Ellipse_Width=0.13
    9  1            0            0.07352      point

Stack "Battery"
  location (X Y Z) 3.36957 0 0.326087, rotation 0 0 0
  bounding box size 1 0.780389 0.650324
  cross sections:
    n  XDelta     YDelta  ZDelta  shape
    0  0          0       0       point
    1  0.0819672  0       0       rounded rectangle RoundRectXSec_Radius=0.0520259 RoundedRect_Height=0.650324 RoundedRect_Width=0.780389
    2  0.520259   0       0       as above
    3  0.26013    0       0       as above
    4  0.0819672  0       0       point

Stack "Module_1"
  location (X Y Z) 3.42 0 0.326087, rotation 0 0 0
  bounding box size 0.133333 0.702516 0.58543
  cross sections:
    n  XDelta  YDelta  ZDelta  shape
    0  0       0       0       point
    1  0       0       0       rounded rectangle RoundRectXSec_Radius=0.0468344 RoundedRect_Height=0.58543 RoundedRect_Width=0.702516
    2  0.05    0       0       as above
    3  0.05    0       0       as above
    4  0       0       0       point

Stack "Module_2"
  location (X Y Z) 3.57 0 0.326087, rotation 0 0 0
  bounding box size 0.133333 0.702516 0.58543
  cross sections:
    n  XDelta  YDelta  ZDelta  shape
    0  0       0       0       point
    1  0       0       0       rounded rectangle RoundRectXSec_Radius=0.0468344 RoundedRect_Height=0.58543 RoundedRect_Width=0.702516
    2  0.05    0       0       as above
    3  0.05    0       0       as above
    4  0       0       0       point

Stack "Module_3"
  location (X Y Z) 3.72 0 0.326087, rotation 0 0 0
  bounding box size 0.133333 0.702516 0.58543
  cross sections:
    n  XDelta  YDelta  ZDelta  shape
    0  0       0       0       point
    1  0       0       0       rounded rectangle RoundRectXSec_Radius=0.0468344 RoundedRect_Height=0.58543 RoundedRect_Width=0.702516
    2  0.05    0       0       as above
    3  0.05    0       0       as above
    4  0       0       0       point

Stack "Module_4"
  location (X Y Z) 3.87 0 0.326087, rotation 0 0 0
  bounding box size 0.133333 0.702516 0.58543
  cross sections:
    n  XDelta  YDelta  ZDelta  shape
    0  0       0       0       point
    1  0       0       0       rounded rectangle RoundRectXSec_Radius=0.0468344 RoundedRect_Height=0.58543 RoundedRect_Width=0.702516
    2  0.05    0       0       as above
    3  0.05    0       0       as above
    4  0       0       0       point

Stack "Module_5"
  location (X Y Z) 4.012 0 0.326087, rotation 0 0 0
  bounding box size 0.133333 0.702516 0.58543
  cross sections:
    n  XDelta  YDelta  ZDelta  shape
    0  0       0       0       point
    1  0       0       0       rounded rectangle RoundRectXSec_Radius=0.0468344 RoundedRect_Height=0.58543 RoundedRect_Width=0.702516
    2  0.05    0       0       as above
    3  0.05    0       0       as above
    4  0       0       0       point

Stack "Motor_3_4"
  location (X Y Z) 1.63043 5 1.30435, rotation 0 0 0
  symmetric about XZ
  bounding box size 0.50425 10.3362 0.280139
  cross sections:
    n  XDelta     YDelta  ZDelta  shape
    0  0          0       0       point
    1  0.112056   0       0       ellipse Ellipse_Height=0.280139 Ellipse_Width=0.336167
    2  0.224111   0       0       as above
    3  0.112056   0       0       as above
    4  0.0560278  0       0       point

Stack "Motor_5_6"
  location (X Y Z) 5.43478 1.84783 2.28261, rotation 0 0 0
  symmetric about XZ
  bounding box size 0.50425 4.03182 0.280139
  cross sections:
    n  XDelta     YDelta  ZDelta  shape
    0  0          0       0       point
    1  0.112056   0       0       ellipse Ellipse_Height=0.280139 Ellipse_Width=0.336167
    2  0.224111   0       0       as above
    3  0.112056   0       0       as above
    4  0.0560278  0       0       point

Stack "Motor_1_2"
  location (X Y Z) 0.326087 2.3913 1.19565, rotation 0 0 0
  symmetric about XZ
  bounding box size 0.50425 5.11878 0.280139
  cross sections:
    n  XDelta     YDelta  ZDelta  shape
    0  0          0       0       point
    1  0.112056   0       0       ellipse Ellipse_Height=0.280139 Ellipse_Width=0.336167
    2  0.224111   0       0       as above
    3  0.112056   0       0       as above
    4  0.0560278  0       0       point

Stack "wire_stack_1"
  location (X Y Z) 2.28261 0 0.978261, rotation 6.95652 0 90
  symmetric about XZ
  bounding box size 0.05 4.7577 0.339516
  cross sections:
    n  XDelta   YDelta  ZDelta  shape
    0  0        0       0       circle Circle_Diameter=0.05
    1  2.39344  0       0       as above

Stack "wire_stack_2"
  location (X Y Z) 2.28261 0 0.978261, rotation 0 4.13043 0
  bounding box size 1.08276 0.05 0.127801
  cross sections:
    n  XDelta   YDelta  ZDelta  shape
    0  0        0       0       circle Circle_Diameter=0.05
    1  1.08197  0       0       as above

Stack "wire_stack_3"
  location (X Y Z) 2.28261 2.3913 1.30435, rotation 0 0 90
  symmetric about XZ
  bounding box size 0.05 10.2252 0.05
  cross sections:
    n  XDelta   YDelta  ZDelta  shape
    0  0        0       0       circle Circle_Diameter=0.05
    1  2.72131  0       0       as above

Stack "wire_stack_4"
  location (X Y Z) 3.36957 0 0.9, rotation 0 90 0
  bounding box size 0.05 0.05 1.2
  cross sections:
    n  XDelta  YDelta  ZDelta  shape
    0  0       0       0       circle Circle_Diameter=0.05
    1  1.2     0       0       as above

Stack "wire_stack_5"
  location (X Y Z) 0.76087 2.3913 1.30435, rotation 0 0 0
  symmetric about XZ
  bounding box size 1.4918 4.83261 0.05
  cross sections:
    n  XDelta  YDelta  ZDelta  shape
    0  0       0       0       circle Circle_Diameter=0.05
    1  1.4918  0       0       as above

Stack "wire_stack_6"
  location (X Y Z) 2.06522 5.1087 1.30435, rotation 0 0 0
  symmetric about XZ
  bounding box size 0.262295 10.2674 0.05
  cross sections:
    n  XDelta    YDelta  ZDelta  shape
    0  0         0       0       circle Circle_Diameter=0.05
    1  0.262295  0       0       as above

BodyOfRevolution "wire_stack_7"
  location (X Y Z) 0.47619 0 0.138, rotation 0 0 0
  bounding box size 0.05 0.892105 0.892105
  Design: A0=0.556958 Ae=0.556958 Amin=0.492783 AminW=0.25 Angle=0 Diameter=0.842105 Mode=0
  profile: circle Circle_Diameter=0.05

Stack "wire_stack_7"
  location (X Y Z) 0.543478 0 -0.3, rotation 0 0 0
  bounding box size 2.80328 0.05 0.05
  cross sections:
    n  XDelta   YDelta  ZDelta  shape
    0  0        0       0       circle Circle_Diameter=0.05
    1  2.80328  0       0       as above

Stack "wire_stack_8"
  location (X Y Z) 5.86957 0 0.434783, rotation 45 0 75
  symmetric about XZ
  bounding box size 0.752624 3.75526 1.89657
  cross sections:
    n  XDelta   YDelta  ZDelta  shape
    0  0        0       0       circle Circle_Diameter=0.05
    1  2.72131  0       0       as above

Stack "wire_stack_9"
  location (X Y Z) 4.23913 0 0.46087, rotation 0 0 0
  bounding box size 1.65574 0.05 0.05
  cross sections:
    n  XDelta   YDelta  ZDelta  shape
    0  0        0       0       circle Circle_Diameter=0.05
    1  1.65574  0       0       as above

Stack "wire_stack_10"
  location (X Y Z) 5.86957 -1.84783 2.28261, rotation 0 0 0
  symmetric about XZ
  bounding box size 0.70213 3.74565 0.05
  cross sections:
    n  XDelta   YDelta  ZDelta  shape
    0  0        0       0       circle Circle_Diameter=0.05
    1  0.70213  0       0       as above

Stack "Module_6"
  location (X Y Z) 4.1507 0 0.326087, rotation 0 0 0
  bounding box size 0.133333 0.702516 0.58543
  cross sections:
    n  XDelta  YDelta  ZDelta  shape
    0  0       0       0       point
    1  0       0       0       rounded rectangle RoundRectXSec_Radius=0.0468344 RoundedRect_Height=0.58543 RoundedRect_Width=0.702516
    2  0.05    0       0       as above
    3  0.05    0       0       as above
    4  0       0       0       point
