OpenVSP model (file version 5), 25 components.
Geometry view with OpenVSP parameter names; values to 6 digits, angles in degrees, lengths in the model's unit.
Overall bounding box: X_Min=0 X_Len=16.2755 Y_Min=-10.1119 Y_Len=20.2239 Z_Min=-0.774354 Z_Len=4.43571

Custom "Seat_4"
  location (X Y Z) 5.71429 0.55 -0.238095, rotation 0 -90 0
  symmetric about XZ
  bounding box size 0.489194 1.54472 1.24522
  Design: BackAngle=0 BackHeight=0.889444 BackThick=0.0889444 SeatHeight=0.311306 SeatLength=0.444722 Width=0.444722
  custom script Seat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

Wing "main_wing"
  location (X Y Z) 5.38 0 1.33609, rotation 0 0 0
  symmetric about XZ
  bounding box size 1.86548 20.2239 0.224997
  totals: TotalSpan=20 TotalProjectedSpan=20 TotalChord=1.86473 TotalArea=37.2946 TotalAR=10.7254
  root: chord 1.86473, twist 0, airfoil file "NACA 63-412 AIRFOIL"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 BaseThickChord=0.120059 ThickChord=0.12
  sections:
    n  Span  Root_Chord  Tip_Chord  Area     Sweep  Sweep_Location  Dihedral  Twist  Twist_Location  tip airfoil
    1  10    1.86473     1.86473    18.6473  0      0.25            0         0      0.25            as above

Wing "horizontal_stabilizer"
  location (X Y Z) 14.2217 0 1.44565, rotation 0 0 0
  symmetric about XZ
  bounding box size 1.38776 6.81661 0.166606
  totals: TotalSpan=6.65 TotalProjectedSpan=6.65 TotalChord=1.38776 TotalArea=9.22859 TotalAR=4.7919
  root: chord 1.38776, twist 0, NACA 4-series Camber=0 CamberLoc=0.2 ThickChord=0.12
  sections:
    n  Span   Root_Chord  Tip_Chord  Area     Sweep  Sweep_Location  Dihedral  Twist  Twist_Location  tip airfoil
    1  3.325  1.38776     1.38776    4.61429  0      0.25            0         0      0.25            as above

Wing "vertical_stabilizer"
  location (X Y Z) 13.5978 0 0.731696, rotation 90 0 0
  bounding box size 2.67765 0.255343 2.92966
  totals: TotalSpan=2.87185 TotalProjectedSpan=2.87185 TotalChord=1.60129 TotalArea=4.59867 TotalAR=1.79345
  root: chord 2.1269, twist 0, NACA 4-series Camber=0 CamberLoc=0.2 ThickChord=0.12
  sections:
    n  Span     Root_Chord  Tip_Chord  Area     Sweep  Sweep_Location  Dihedral  Twist  Twist_Location  tip airfoil
    1  2.87185  2.1269      1.07569    4.59867  25     0.25            0         0      0.25            as above

Propeller "PropGeom"
  location (X Y Z) 4.46429 -2.5 1.09929, rotation 0 0 0
  symmetric about XZ
  bounding box size 0.194494 6.36562 2.28408
  Design: Diameter=2.59 NumBlade=3 Beta34=37.4951 UseBeta34Flag=1 Feather=0.0111854 Rotate=0 Precone=0 ReverseFlag=0 FoldAngle=0 PropMode=0 AF=108.311 CLi=0.798428 Chord=0.156891 Solidity=0.14982 ConstructXoC=0.5 FeatherAxisXoC=0.5 FeatherOffsetXoC=0
  cross sections:
    n  RadiusFrac  shape
    0  0.210526    NACA 16-series Chord=0.109645 IdealCl=0.8 ThickChord=0.120315
    1  1           NACA 16-series Chord=0.0943796 IdealCl=0.8 ThickChord=0.120315
  Chord along r/R (PCHIP): 0.210526: 0.0846678, 0.25: 0.108256, 0.289474: 0.130268, 0.328947: 0.149766, 0.368421: 0.166186, 0.407895: 0.179282, 0.447368: 0.189063, 0.486842: 0.195584, 0.526316: 0.199081, 0.565789: 0.199819, 0.605263: 0.19804, 0.644737: 0.193957, 0.684211: 0.187734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
  Twist along r/R (PCHIP): 0.210526: 71.3443, 0.25: 67.3532, 0.289474: 63.2997, 0.328947: 59.6082, 0.368421: 56.4055, 0.407895: 53.8072, 0.447368: 51.8821, 0.486842: 49.627, 0.526316: 47.3947, 0.565789: 45.3262, 0.605263: 43.4089, 0.644737: 41.6308, 0.684211: 39.9802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
  Sweep along r/R (PCHIP): 0.210526: 0, 0.25: 0.0235833, 0.289474: 0.0393619, 0.328947: 0.0494343, 0.368421: 0.0552593, 0.407895: 0.0579244, 0.447368: 0.0582726, 0.486842: 0.0568954, 0.526316: 0.0542931, 0.565789: 0.050837, 0.605263: 0.0467936, 0.644737: 0.0423522, 0.684211: 0.0376409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
  Thick along r/R (PCHIP): 0.210526: 0.120315, 0.25: 0.120315, 0.289474: 0.120315, 0.328947: 0.120315, 0.368421: 0.120315, 0.407895: 0.120315, 0.447368: 0.120315, 0.486842: 0.120315, 0.526316: 0.120315, 0.565789: 0.120315, 0.605263: 0.120315, 0.644737: 0.120315, 0.684211: 0.120315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
  CLI along r/R (PCHIP): 0.210526: 0.8, 0.25: 0.8, 0.289474: 0.8, 0.328947: 0.8, 0.368421: 0.8, 0.407895: 0.8, 0.447368: 0.8, 0.486842: 0.8, 0.526316: 0.8, 0.565789: 0.8, 0.605263: 0.8, 0.644737: 0.8, 0.684211: 0.8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

Stack "nacelles"
  location (X Y Z) 4.25652 2.5 1.1187, rotation 0 0 0
  symmetric about XZ
  bounding box size 2.57377 5.71356 0.864912
  cross sections:
    n  XDelta    YDelta  ZDelta     shape
    0  0         0       0          point
    1  0.2       0       0          ellipse Ellipse_Height=0.4 Ellipse_Width=0.4
    2  0.4       0       0          rounded rectangle RoundRectXSec_Radius=0.2 RoundedRect_Height=0.52 RoundedRect_Width=0.7
    3  0.154098  0       -0.163934  rounded rectangle RoundRectXSec_Radius=0.2 RoundedRect_Height=0.851351 RoundedRect_Width=0.7
    4  0.4       0       0.0819672  rounded rectangle RoundRectXSec_Radius=0.2 RoundedRect_Height=0.674595 RoundedRect_Width=0.7
    5  1.21967   0       0.163934   ellipse Ellipse_Height=0.3 Ellipse_Width=0.5
    6  0.2       0       0          point

Fuselage "fuselage"
  location (X Y Z) 0 0 0, rotation 0 0 0
  bounding box size 15.77 1.79297 2.20327
  Design: Length=15.77
  cross sections:
    n   XLocPercent  YLocPercent  ZLocPercent  shape
    0   0            0            0            point
    1   0.0053155    0            -0.00170154  ellipse Ellipse_Height=0.421667 Ellipse_Width=0.500012
    2   0.0192758    0            4.22744e-05  ellipse Ellipse_Height=0.733333 Ellipse_Width=0.789795
    3   0.0742993    0            0.00294864   ellipse Ellipse_Height=1.22833 Ellipse_Width=1.21937
    4   0.139804     0            0.005855     ellipse Ellipse_Height=1.57667 Ellipse_Width=1.55391
    5   0.165845     0            0.014501     ellipse Ellipse_Height=1.94333 Ellipse_Width=1.64242
    6   0.187486     0            0.0198055    rounded rectangle RoundRectXSec_Radius=0.834545 RoundedRect_Height=2.16333 RoundedRect_Width=1.71486
    7   0.461791     0            0.0198053    rounded rectangle RoundRectXSec_Radius=0.8 RoundedRect_Height=2.16333 RoundedRect_Width=1.75
    8   0.612446     0            0.0223209    rounded rectangle RoundRectXSec_Radius=0.8 RoundedRect_Height=2.1 RoundedRect_Width=1.75
    9   0.765623     0            0.0285352    rounded rectangle RoundRectXSec_Radius=0.8 RoundedRect_Height=1.74937 RoundedRect_Width=1.20676
    10  0.98824      0            0.0461248    ellipse Ellipse_Height=0.386962 Ellipse_Width=0.234599
    11  1            0            0.0451566    point

Wing "fairing"
  location (X Y Z) 5.85217 0.326087 -0.619565, rotation 39.4565 0 0
  symmetric about XZ
  bounding box size 0.469598 5.17449 1.93951
  totals: TotalSpan=5.75026 TotalProjectedSpan=5.75026 TotalChord=0.469598 TotalArea=2.70031 TotalAR=12.2451
  root: chord 0.469598, twist 0, NACA 4-series Camber=0 CamberLoc=0.2 ThickChord=0.390909
  sections:
    n  Span     Root_Chord  Tip_Chord  Area     Sweep  Sweep_Location  Dihedral  Twist  Twist_Location  tip airfoil
    1  2.87513  0.469598    0.469598   1.35016  0      0.25            0         0      0.25            NACA 4-series Camber=0 CamberLoc=0.2 ThickChord=0.159091

Custom "Seat_1"
  location (X Y Z) 4.7619 0.55 -0.238095, rotation 0 -90 0
  symmetric about XZ
  bounding box size 0.489194 1.54472 1.24522
  Design: BackAngle=0 BackHeight=0.889444 BackThick=0.0889444 SeatHeight=0.311306 SeatLength=0.444722 Width=0.444722
  custom script Seat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

Custom "Seat_2"
  location (X Y Z) 3.80952 0.55 -0.238095, rotation 0 -90 0
  symmetric about XZ
  bounding box size 0.489194 1.54472 1.24522
  Design: BackAngle=0 BackHeight=0.889444 BackThick=0.0889444 SeatHeight=0.311306 SeatLength=0.444722 Width=0.444722
  custom script Seat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

Custom "Seat_5"
  location (X Y Z) 6.66667 0.55 -0.238095, rotation 0 -90 0
  symmetric about XZ
  bounding box size 0.489194 1.54472 1.24522
  Design: BackAngle=0 BackHeight=0.889444 BackThick=0.0889444 SeatHeight=0.311306 SeatLength=0.444722 Width=0.444722
  custom script Seat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

Custom "Seat_3"
  location (X Y Z) 8.57143 0.55 -0.238095, rotation 0 -90 0
  symmetric about XZ
  bounding box size 0.489194 1.54472 1.24522
  Design: BackAngle=0 BackHeight=0.889444 BackThick=0.0889444 SeatHeight=0.311306 SeatLength=0.444722 Width=0.444722
  custom script Seat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

Custom "Seat_6"
  location (X Y Z) 7.61905 0.55 -0.238095, rotation 0 -90 0
  symmetric about XZ
  bounding box size 0.489194 1.54472 1.24522
  Design: BackAngle=0 BackHeight=0.889444 BackThick=0.0889444 SeatHeight=0.311306 SeatLength=0.444722 Width=0.444722
  custom script Seat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

Custom "Seat_7"
  location (X Y Z) 9.52381 0.55 -0.238095, rotation 0 -90 0
  bounding box size 0.489194 0.444722 1.24522
  Design: BackAngle=0 BackHeight=0.889444 BackThick=0.0889444 SeatHeight=0.311306 SeatLength=0.444722 Width=0.444722
  custom script Seat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

Custom "Seat_22"
  location (X Y Z) 3.80952 0.0738095 -0.238095, rotation 0 -90 0
  bounding box size 0.489194 0.444722 1.24522
  Design: BackAngle=0 BackHeight=0.889444 BackThick=0.0889444 SeatHeight=0.311306 SeatLength=0.444722 Width=0.444722
  custom script Seat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

Custom "Seat_12"
  location (X Y Z) 4.7619 0.0738095 -0.238095, rotation 0 -90 0
  bounding box size 0.489194 0.444722 1.24522
  Design: BackAngle=0 BackHeight=0.889444 BackThick=0.0889444 SeatHeight=0.311306 SeatLength=0.444722 Width=0.444722
  custom script Seat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

Custom "Seat_32"
  location (X Y Z) 5.71429 0.0738095 -0.238095, rotation 0 -90 0
  bounding box size 0.489194 0.444722 1.24522
  Design: BackAngle=0 BackHeight=0.889444 BackThick=0.0889444 SeatHeight=0.311306 SeatLength=0.444722 Width=0.444722
  custom script Seat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

Custom "Seat_62"
  location (X Y Z) 8.57143 0.0738095 -0.238095, rotation 0 -90 0
  bounding box size 0.489194 0.444722 1.24522
  Design: BackAngle=0 BackHeight=0.889444 BackThick=0.0889444 SeatHeight=0.311306 SeatLength=0.444722 Width=0.444722
  custom script Seat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

Custom "Seat_52"
  location (X Y Z) 6.66667 0.0738095 -0.238095, rotation 0 -90 0
  bounding box size 0.489194 0.444722 1.24522
  Design: BackAngle=0 BackHeight=0.889444 BackThick=0.0889444 SeatHeight=0.311306 SeatLength=0.444722 Width=0.444722
  custom script Seat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

Custom "Seat_42"
  location (X Y Z) 7.61905 0.0738095 -0.238095, rotation 0 -90 0
  bounding box size 0.489194 0.444722 1.24522
  Design: BackAngle=0 BackHeight=0.889444 BackThick=0.0889444 SeatHeight=0.311306 SeatLength=0.444722 Width=0.444722
  custom script Seat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

Custom "Seat_P"
  location (X Y Z) 2.61905 0.311905 -0.238095, rotation 0 -90 0
  symmetric about XZ
  bounding box size 0.489194 1.06853 1.24522
  Design: BackAngle=0 BackHeight=0.889444 BackThick=0.0889444 SeatHeight=0.311306 SeatLength=0.444722 Width=0.444722
  custom script Seat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

Stack "Battery_1"
  location (X Y Z) 3.26087 0 -0.5, rotation 0 0 0
  bounding box size 2.42732 1.29632 0.4
  cross sections:
    n  XDelta     YDelta  ZDelta  shape
    0  0          0       0       point
    1  0.180328   0       0       rounded rectangle RoundRectXSec_KeyCorner=1 RoundRectXSec_Radius=0 RoundRectXSec_RadiusBL=0.4 RoundRectXSec_RadiusBR=0.4 RoundRectXSec_RadiusTL=0 RoundedRect_Height=0.4 RoundedRect_RadiusSymmetryType=1 RoundedRect_Width=1.25
    2  2          0       0       as above
    3  0.0901639  0       0       point

Stack "Battery_2"
  location (X Y Z) 6.52174 0 -0.5, rotation 0 0 0
  bounding box size 2.42661 1.29632 0.4
  cross sections:
    n  XDelta      YDelta  ZDelta  shape
    0  0           0       0       point
    1  0.180328    0       0       rounded rectangle RoundRectXSec_KeyCorner=1 RoundRectXSec_Radius=0 RoundRectXSec_RadiusBL=0.4 RoundRectXSec_RadiusBR=0.4 RoundRectXSec_RadiusTL=0 RoundedRect_Height=0.4 RoundedRect_RadiusSymmetryType=1 RoundedRect_Width=1.25
    2  2           0       0       as above
    3  -0.0737705  0       0       point

Stack "BTMS"
  location (X Y Z) 8.80435 0 -0.5, rotation 0 0 0
  bounding box size 1.24885 1.04347 0.4
  cross sections:
    n  XDelta      YDelta  ZDelta  shape
    0  0           0       0       point
    1  0.0983607   0       0       rounded rectangle RoundRectXSec_KeyCorner=1 RoundRectXSec_Radius=0 RoundRectXSec_RadiusBL=0.4 RoundRectXSec_RadiusBR=0.4 RoundRectXSec_RadiusTL=0 RoundedRect_Height=0.4 RoundedRect_RadiusSymmetryType=1 RoundedRect_Width=0.997151
    2  0.934426    0       0       rounded rectangle RoundRectXSec_KeyCorner=1 RoundRectXSec_Radius=0 RoundRectXSec_RadiusBL=0.4 RoundRectXSec_RadiusBR=0.4 RoundRectXSec_RadiusTL=0 RoundedRect_Height=0.337297 RoundedRect_RadiusSymmetryType=1 RoundedRect_Width=0.85757
    3  -0.0737705  0       0       point

Wing "Reservoir"
  location (X Y Z) 5.4887 1.63043 1.33609, rotation 0 0 0
  symmetric about XZ
  bounding box size 1.52958 8.42725 0.184483
  totals: TotalSpan=5 TotalProjectedSpan=5 TotalChord=1.52896 TotalArea=7.6448 TotalAR=3.2702
  root: chord 1.52896, twist 0, airfoil file "NACA 63-412 AIRFOIL"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 BaseThickChord=0.120059 ThickChord=0.12
  sections:
    n  Span  Root_Chord  Tip_Chord  Area    Sweep  Sweep_Location  Dihedral  Twist  Twist_Location  tip airfoil
    1  2.5   1.52896     1.52896    3.8224  0      0.25            0         0      0.25            airfoil file "NACA 63-412 AIRFOIL"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 BaseThickChord=0.120059 ThickChord=0.109091
