OpenVSP model (file version 4), 1 components.
Geometry view with OpenVSP parameter names; values to 6 digits, angles in degrees, lengths in the model's unit.

Wing "main_wing"
  location (X Y Z) 0 0 0, rotation 0 0 0
  symmetric about XZ
  bounding box size 48.4163 88.109 7.53101
  totals: TotalSpan=94.5214 TotalProjectedSpan=88.0872 TotalChord=21.6918 TotalArea=1490.13 TotalAR=5.20717
  root: chord 44.196, twist 0, airfoil file "EPPLER_336_AIRFOIL"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 ThickChord=0.15
  sections:
    n  Span     Root_Chord  Tip_Chord  Area     Sweep  Sweep_Location  Dihedral  Twist  Twist_Location  tip airfoil
    1  2.29027  44.196      41.7033    98.3662  30     0.25            0         0      0.25            airfoil file "EPPLER_336_AIRFOIL"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 ThickChord=0.165
    2  3.78775  41.7033     33.589     142.594  52.5   0.25            0         0      0.25            airfoil file "EPPLER_336_AIRFOIL"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 ThickChord=0.167
    3  3.65753  33.589      27.5783    111.86   36.9   0.25            1.85      0      0.25            airfoil file "EPPLER_336_AIRFOIL"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 ThickChord=0.171
    4  10.3997  27.5783     13.8333    215.335  30.4   0.25            1.85      0      0.25            airfoil file "SC(2)-0414	AIRFOIL"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 ThickChord=0.175
    5  4.89139  13.8333     8.70661    55.1259  30.85  0.25            1.85      0      0.25            airfoil file "SC(2)-0406	AIRFOIL"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 ThickChord=0.118
    6  17.7148  8.70661     3.80086    110.783  34.3   0.25            1.85      0      0.25            airfoil file "SC(2)-0406	AIRFOIL"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 ThickChord=0.1
    7  4.51927  3.80086     1.0668     10.9991  55     0.25            73        0      0.25            airfoil file "NACA 0012 AIRFOILS"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 ThickChord=0.1
