OpenVSP model (file version 5), 21 components.
Geometry view with OpenVSP parameter names; values to 6 digits, angles in degrees, lengths in the model's unit.
Overall bounding box: X_Min=0 X_Len=8.54798 Y_Min=-5.50139 Y_Len=11.0028 Z_Min=-0.297154 Z_Len=2.70214

Wing "main_wing"
  location (X Y Z) 2.93 0 1.01, rotation 0 0 0
  symmetric about XZ
  bounding box size 1.0004 11.0028 0.462752
  totals: TotalSpan=11.63 TotalProjectedSpan=11 TotalChord=0.73 TotalArea=10.2111 TotalAR=11.8499
  root: chord 1, twist 0, airfoil file "NACA 63-412 AIRFOIL"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 BaseThickChord=0.120059 ThickChord=0.12
  sections:
    n  Span      Root_Chord  Tip_Chord  Area      Sweep  Sweep_Location  Dihedral  Twist  Twist_Location  tip airfoil
    1  2.9909    1           1          2.9909    0      0.25            0         0      0.25            as above
    2  2.3991    1           0.63       1.95527   0      0.25            0         0      0.25            as above
    3  0.425007  0.63        0.12       0.159378  45     0.25            75        0      0.25            as above

Wing "horizontal_stabilizer"
  location (X Y Z) 7.7 0 0.25, rotation 0 0 0
  symmetric about XZ
  bounding box size 0.769 3.39232 0.0923217
  totals: TotalSpan=3.3 TotalProjectedSpan=3.3 TotalChord=0.769 TotalArea=2.5377 TotalAR=4.29129
  root: chord 0.769, twist 0, NACA 4-series Camber=0 CamberLoc=0.2 ThickChord=0.12
  sections:
    n  Span  Root_Chord  Tip_Chord  Area     Sweep  Sweep_Location  Dihedral  Twist  Twist_Location  tip airfoil
    1  1.65  0.769       0.769      1.26885  0      0.25            0         0      0.25            as above

Wing "vertical_stabilizer"
  location (X Y Z) 6.75 0 0.514304, rotation 90 0 0
  bounding box size 1.79798 0.201259 1.89068
  totals: TotalSpan=1.854 TotalProjectedSpan=1.854 TotalChord=1.1811 TotalArea=2.18976 TotalAR=1.56972
  root: chord 1.6764, twist 0, NACA 4-series Camber=0 CamberLoc=0.2 ThickChord=0.12
  sections:
    n  Span   Root_Chord  Tip_Chord  Area     Sweep  Sweep_Location  Dihedral  Twist  Twist_Location  tip airfoil
    1  1.854  1.6764      0.6858     2.18976  25     0.25            0         0      0.25            as above

Propeller "PropGeom"
  location (X Y Z) 2.5 1.63 1.01, rotation 0 0 0
  bounding box size 0.144962 1.47829 1.70239
  Design: Diameter=1.9304 NumBlade=3 Beta34=37.4951 UseBeta34Flag=1 Feather=0.0111854 Rotate=0 Precone=0 ReverseFlag=0 FoldAngle=0 PropMode=0 AF=108.311 CLi=0.798428 Chord=0.156891 Solidity=0.14982 ConstructXoC=0.5 FeatherAxisXoC=0.5 FeatherOffsetXoC=0
  cross sections:
    n  RadiusFrac  shape
    0  0.210526    NACA 16-series Chord=0.0817214 IdealCl=0.8 ThickChord=0.120315
    1  1           NACA 16-series Chord=0.0703438 IdealCl=0.8 ThickChord=0.120315
  Chord along r/R (PCHIP): 0.210526: 0.0846678, 0.25: 0.108256, 0.289474: 0.130268, 0.328947: 0.149766, 0.368421: 0.166186, 0.407895: 0.179282, 0.447368: 0.189063, 0.486842: 0.195584, 0.526316: 0.199081, 0.565789: 0.199819, 0.605263: 0.19804, 0.644737: 0.193957, 0.684211: 0.187734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
  Twist along r/R (PCHIP): 0.210526: 71.3443, 0.25: 67.3532, 0.289474: 63.2997, 0.328947: 59.6082, 0.368421: 56.4055, 0.407895: 53.8072, 0.447368: 51.8821, 0.486842: 49.627, 0.526316: 47.3947, 0.565789: 45.3262, 0.605263: 43.4089, 0.644737: 41.6308, 0.684211: 39.9802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
  Sweep along r/R (PCHIP): 0.210526: 0, 0.25: 0.0235833, 0.289474: 0.0393619, 0.328947: 0.0494343, 0.368421: 0.0552593, 0.407895: 0.0579244, 0.447368: 0.0582726, 0.486842: 0.0568954, 0.526316: 0.0542931, 0.565789: 0.050837, 0.605263: 0.0467936, 0.644737: 0.0423522, 0.684211: 0.0376409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
  Thick along r/R (PCHIP): 0.210526: 0.120315, 0.25: 0.120315, 0.289474: 0.120315, 0.328947: 0.120315, 0.368421: 0.120315, 0.407895: 0.120315, 0.447368: 0.120315, 0.486842: 0.120315, 0.526316: 0.120315, 0.565789: 0.120315, 0.605263: 0.120315, 0.644737: 0.120315, 0.684211: 0.120315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
  CLI along r/R (PCHIP): 0.210526: 0.8, 0.25: 0.8, 0.289474: 0.8, 0.328947: 0.8, 0.368421: 0.8, 0.407895: 0.8, 0.447368: 0.8, 0.486842: 0.8, 0.526316: 0.8, 0.565789: 0.8, 0.605263: 0.8, 0.644737: 0.8, 0.684211: 0.8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

Propeller "PropGeom"
  location (X Y Z) 2.5 -1.63 1.01, rotation 0 0 0
  bounding box size 0.144962 1.47829 1.70239
  Design: Diameter=1.9304 NumBlade=3 Beta34=37.4951 UseBeta34Flag=1 Feather=0.0111854 Rotate=0 Precone=0 ReverseFlag=0 FoldAngle=0 PropMode=0 AF=108.311 CLi=0.798428 Chord=0.156891 Solidity=0.14982 ConstructXoC=0.5 FeatherAxisXoC=0.5 FeatherOffsetXoC=0
  cross sections:
    n  RadiusFrac  shape
    0  0.210526    NACA 16-series Chord=0.0817214 IdealCl=0.8 ThickChord=0.120315
    1  1           NACA 16-series Chord=0.0703438 IdealCl=0.8 ThickChord=0.120315
  blade curves as in "PropGeom"

Stack "Nacelle"
  location (X Y Z) 2.3 -1.63 1.01, rotation 0 0 0
  symmetric about XZ
  bounding box size 2 3.96 0.52
  cross sections:
    n  XDelta  YDelta  ZDelta  shape
    0  0       0       0       point
    1  0.2     0       0       ellipse Ellipse_Height=0.5 Ellipse_Width=0.65
    2  0.4     0       0       ellipse Ellipse_Height=0.52 Ellipse_Width=0.7
    3  0.4     0       0       ellipse Ellipse_Height=0.5 Ellipse_Width=0.65
    4  0.4     0       0       ellipse Ellipse_Height=0.4 Ellipse_Width=0.6
    5  0.4     0       0       ellipse Ellipse_Height=0.3 Ellipse_Width=0.5
    6  0.2     0       0       point

Fuselage "fuselage"
  location (X Y Z) 0 0 0, rotation 0 0 0
  bounding box size 8.43788 1.2092 1.46998
  Design: Length=8.43788
  cross sections:
    n   XLocPercent  YLocPercent  ZLocPercent  shape
    0   0            0            0            point
    1   0.00727912   0            0.00125101   ellipse Ellipse_Height=0.166906 Ellipse_Width=0.278021
    2   0.019411     0            0.0012161    ellipse Ellipse_Height=0.31295 Ellipse_Width=0.436578
    3   0.0630857    0            0.00739549   ellipse Ellipse_Height=0.584173 Ellipse_Width=0.673512
    4   0.165376     0            0.0289128    ellipse Ellipse_Height=1.06403 Ellipse_Width=1.0672
    5   0.242637     0            0.0421415    ellipse Ellipse_Height=1.29377 Ellipse_Width=1.18306
    6   0.296017     0            0.0470524    ellipse Ellipse_Height=1.37703 Ellipse_Width=1.18154
    7   0.38094      0            0.0531358    ellipse Ellipse_Height=1.43957 Ellipse_Width=1.17822
    8   0.504685     0            0.0465549    ellipse Ellipse_Height=1.29353 Ellipse_Width=1.05439
    9   0.645415     0            0.0374197    ellipse Ellipse_Height=0.897122 Ellipse_Width=0.850193
    10  0.985107     0            0.0454028    ellipse Ellipse_Height=0.292086 Ellipse_Width=0.201257
    11  1            0            0.0478758    ellipse Ellipse_Height=0.12518 Ellipse_Width=0.120602
    12  1            0            0.0478758    point

Stack "Motors"
  location (X Y Z) 2.5 -1.63043 0.978261, rotation 0 0 0
  symmetric about XZ
  bounding box size 0.5 3.66087 0.4
  cross sections:
    n  XDelta  YDelta  ZDelta  shape
    0  0       0       0       point
    1  0.1     0       0       circle Circle_Diameter=0.4
    2  0.3     0       0       as above
    3  0.1     0       0       point

Stack "Fuel_Cell"
  location (X Y Z) 5.54348 0 0.326087, rotation 0 0 0
  bounding box size 1.28033 0.7 0.75
  cross sections:
    n  XDelta    YDelta  ZDelta  shape
    0  0         0       0       point
    1  0.180328  0       0       ellipse Ellipse_Height=0.75 Ellipse_Width=0.7
    2  1         0       0       ellipse Ellipse_Height=0.554054 Ellipse_Width=0.4
    3  0.1       0       0       point

Stack "Battery_3"
  location (X Y Z) 5.32609 0 0.326087, rotation 0 0 0
  bounding box size 0.163934 0.500001 0.7
  cross sections:
    n  XDelta     YDelta  ZDelta  shape
    0  0          0       0       point
    1  0.02       0       0       rounded rectangle RoundRectXSec_Radius=0.01 RoundedRect_Height=0.7 RoundedRect_Width=0.5
    2  0.0983607  0       0       as above
    3  0.02       0       0       point

Stack "Battery_2"
  location (X Y Z) 5.159 0 0.326087, rotation 0 0 0
  bounding box size 0.163934 0.500001 0.7
  cross sections:
    n  XDelta     YDelta  ZDelta  shape
    0  0          0       0       point
    1  0.02       0       0       rounded rectangle RoundRectXSec_Radius=0.01 RoundedRect_Height=0.7 RoundedRect_Width=0.5
    2  0.0983607  0       0       as above
    3  0.02       0       0       point

Stack "Battery_1"
  location (X Y Z) 5 0 0.326087, rotation 0 0 0
  bounding box size 0.163934 0.500001 0.7
  cross sections:
    n  XDelta     YDelta  ZDelta  shape
    0  0          0       0       point
    1  0.02       0       0       rounded rectangle RoundRectXSec_Radius=0.01 RoundedRect_Height=0.7 RoundedRect_Width=0.5
    2  0.0983607  0       0       as above
    3  0.02       0       0       point

Stack "Wire_2"
  location (X Y Z) 2.6087 1.63043 0.978261, rotation 0 0 0
  symmetric about XZ
  bounding box size 0.707161 3.36087 0.1
  cross sections:
    n  XDelta    YDelta  ZDelta  shape
    0  0         0       0       point
    1  0.01      0       0       circle Circle_Diameter=0.1
    2  0.590164  0       0       as above
    3  0.1       0       0       point

Stack "Wire_1"
  location (X Y Z) 3.26087 0 0.978261, rotation 0 0 90
  symmetric about XZ
  bounding box size 0.1 3.36754 0.1
  cross sections:
    n  XDelta   YDelta  ZDelta  shape
    0  0        0       0       point
    1  0.01     0       0       circle Circle_Diameter=0.1
    2  1.57377  0       0       as above
    3  0.1      0       0       point

Stack "Wire_3"
  location (X Y Z) 3.36957 0 0.978261, rotation 0 0 90
  symmetric about XZ
  bounding box size 0.1 3.5294 0.1
  cross sections:
    n  XDelta  YDelta  ZDelta  shape
    0  0       0       0       point
    1  0.01    0       0       circle Circle_Diameter=0.1
    2  1.7377  0       0       as above
    3  0.01    0       0       point

Stack "Wire_4"
  location (X Y Z) 2.71739 1.73913 0.978261, rotation 0 0 0
  symmetric about XZ
  bounding box size 0.707161 3.57826 0.1
  cross sections:
    n  XDelta    YDelta  ZDelta  shape
    0  0         0       0       point
    1  0.01      0       0       circle Circle_Diameter=0.1
    2  0.590164  0       0       as above
    3  0.1       0       0       point

Stack "Wire_5"
  location (X Y Z) 3.36957 0 0.978261, rotation 0 7.6087 0
  bounding box size 2.65745 0.1 0.444919
  cross sections:
    n  XDelta   YDelta  ZDelta  shape
    0  0        0       0       point
    1  0.01     0       0       circle Circle_Diameter=0.1
    2  2.55738  0       0       as above
    3  0.1      0       0       point

Stack "Wire_6"
  location (X Y Z) 0.434783 0 -0.159, rotation 0 0 0
  bounding box size 3.82191 0.1 0.1
  cross sections:
    n  XDelta   YDelta  ZDelta  shape
    0  0        0       0       point
    1  0.01     0       0       circle Circle_Diameter=0.1
    2  3.70492  0       0       as above
    3  0.1      0       0       point

BodyOfRevolution "BORGeom"
  location (X Y Z) 0.446 0 0.05, rotation 0 0 0
  bounding box size 0.0916667 0.512719 0.512719
  Design: A0=0.13924 Ae=0.13924 Amin=0.0852119 AminW=0.25 Angle=0 Diameter=0.421053 Mode=0
  profile: circle Circle_Diameter=0.0916667

Stack "Wire_5"
  location (X Y Z) 3.36957 0 0.869565, rotation 0 7.6087 0
  bounding box size 2.08873 0.1 0.368948
  cross sections:
    n  XDelta   YDelta  ZDelta  shape
    0  0        0       0       point
    1  0.01     0       0       circle Circle_Diameter=0.1
    2  1.98361  0       0       as above
    3  0.1      0       0       point

Stack "Wire_6"
  location (X Y Z) 4.13043 0 -0.159, rotation 0 -30 0
  bounding box size 0.637419 0.1 0.408817
  cross sections:
    n  XDelta    YDelta  ZDelta  shape
    0  0         0       0       point
    1  0.01      0       0       circle Circle_Diameter=0.1
    2  0.590164  0       0       as above
    3  0.1       0       0       point
