OpenVSP model (file version 5), 3 components.
Geometry view with OpenVSP parameter names; values to 6 digits, angles in degrees, lengths in the model's unit.
Overall bounding box: X_Min=13.9991 X_Len=42.5009 Y_Min=-12.8082 Y_Len=25.6163 Z_Min=-0.955876 Z_Len=8.00122

Wing "main_wing"
  location (X Y Z) 14 0 -0.8, rotation 0 0 0
  symmetric about XZ
  bounding box size 33.8009 25.6163 1.03229
  totals: TotalSpan=25.6 TotalProjectedSpan=25.6 TotalChord=11.8833 TotalArea=404.88 TotalAR=1.61865
  root: chord 33.8, twist 0, airfoil file "NACA 65-203"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 BaseThickChord=0.0299953 ThickChord=0.03
  sections:
    n  Span  Root_Chord  Tip_Chord  Area    Sweep  Sweep_Location  Dihedral  Twist  Twist_Location  tip airfoil
    1  6.15  33.8        13.8       146.37  67     0.25            0         0      0.25            as above
    2  5.95  13.8        4.4        54.145  48     0.25            0         0      0.25            as above
    3  0.7   4.4         1.1        1.925   71     0.25            0         0      0.25            as above

Wing "vertical_stabilizer"
  location (X Y Z) 42 0 1, rotation 90 0 0
  bounding box size 14.5002 0.580008 6.04534
  totals: TotalSpan=6 TotalProjectedSpan=6 TotalChord=8.05 TotalArea=44.76 TotalAR=0.80429
  root: chord 14.5, twist 0, airfoil file "NACA 65-204 no camber, 151 panels"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 BaseThickChord=0.0400013 ThickChord=0.04
  sections:
    n  Span  Root_Chord  Tip_Chord  Area   Sweep  Sweep_Location  Dihedral  Twist  Twist_Location  tip airfoil
    1  2.4   14.5        7.5        26.4   63     0.25            0         0      0.25            as above
    2  3.6   7.5         2.7        18.36  40     0.25            0         0      0.25            as above

Fuselage "fuselage"
  location (X Y Z) 0 0 0, rotation 0 0 0
  bounding box size 30 2.70416 3
  Design: Length=61.66
  cross sections:
    n  XLocPercent  YLocPercent  ZLocPercent  shape
    0  0            0            -0.01        point
    1  0.200843     0            0            ellipse Ellipse_Height=3.32 Ellipse_Width=2.88
    2  0.364093     0            0            as above
    3  0.70107      0            0            as above
    4  1            0            0.02         point
