OpenVSP model (file version 4), 10 components.
Geometry view with OpenVSP parameter names; values to 6 digits, angles in degrees, lengths in the model's unit.
Overall bounding box: X_Min=0 X_Len=30 Y_Min=-5.48682 Y_Len=10.9736 Z_Min=-1.5 Z_Len=3

Wing "main_wing"
  location (X Y Z) 1.0668 0 -0.1524, rotation 0 0 0
  symmetric about XZ
  bounding box size 1.9812 10.9736 0.588008
  totals: TotalSpan=11.0518 TotalProjectedSpan=10.9727 TotalChord=0.678567 TotalArea=10.5828 TotalAR=11.3771
  root: chord 1.9812, twist 0, NACA 4-series Camber=0 CamberLoc=0.2 ThickChord=0.18
  sections:
    n  Span       Root_Chord  Tip_Chord  Area         Sweep  Sweep_Location  Dihedral  Twist  Twist_Location  tip airfoil
    1  0.783209   1.9812      0.9144     1.13393      30     0.25            2         0      0.25            as above
    2  3.90144    0.9144      0.9144     3.56748      0      0.25            2         0      0.25            NACA 4-series Camber=0 CamberLoc=0.2 ThickChord=0.16
    3  0.660115   0.9144      0.64008    0.513068     17     0.25            10        0      0.25            as above
    4  0.0905652  0.64008     0.48768    0.0510679    51     0.25            20        0      0.25            NACA 4-series Camber=0 CamberLoc=0.2 ThickChord=0.15
    5  0.0905652  0.48768     0.0828291  0.0258341    73     0.25            40        0      0.25            NACA 4-series Camber=0 CamberLoc=0.2 ThickChord=0
    6  1e-06      0.0828291   0.0828291  8.28291e-08  0      0.25            0         0      0.25            NACA 4-series Camber=0 CamberLoc=0.2 ThickChord=0.1

Wing "horiztail"
  location (X Y Z) 5.59904 0 1.12643, rotation 0 0 0
  symmetric about XZ
  bounding box size 0.6096 2.9874 0.073199
  totals: TotalSpan=2.9142 TotalProjectedSpan=2.9142 TotalChord=0.6096 TotalArea=1.7765 TotalAR=4.78052
  root: chord 0.6096, twist 0, NACA 4-series Camber=0 CamberLoc=0.2 ThickChord=0.12
  sections:
    n  Span    Root_Chord  Tip_Chord  Area      Sweep  Sweep_Location  Dihedral  Twist  Twist_Location  tip airfoil
    1  1.4571  0.6096      0.6096     0.888249  0      0.25            0         0      0.25            as above

Wing "verttail"
  location (X Y Z) 4.96957 1.65659 -0.165652, rotation 90 0 0
  symmetric about XZ
  bounding box size 1.2192 3.45953 1.32387
  totals: TotalSpan=2.5781 TotalProjectedSpan=2.5781 TotalChord=0.9144 TotalArea=2.35742 TotalAR=2.81944
  root: chord 1.2192, twist 0, NACA 4-series Camber=0 CamberLoc=0.2 ThickChord=0.12
  sections:
    n  Span     Root_Chord  Tip_Chord  Area     Sweep    Sweep_Location  Dihedral  Twist  Twist_Location  tip airfoil
    1  1.28905  1.2192      0.6096     1.17871  13.6823  0.25            0         0      0.25            as above

Fuselage "Fuselage"
  location (X Y Z) 0 0 0, rotation 0 0 0
  bounding box size 30 2.70416 3
  Design: Length=3.82524
  cross sections:
    n  XLocPercent  YLocPercent  ZLocPercent  shape
    0  0            0            0            point
    1  0.25         0            0            ellipse Ellipse_Height=1.07104 Ellipse_Width=1.31618
    2  0.408367     0            0            ellipse Ellipse_Height=1.31761 Ellipse_Width=1.31618
    3  0.75         0            0            ellipse Ellipse_Height=1.17071 Ellipse_Width=1.31618
    4  1            0            0.02         point

Fuselage "BoomMR"
  location (X Y Z) 0.64008 3.01487 -0.33528, rotation 0 0 0
  bounding box size 30 2.70416 3
  Design: Length=3.10896
  cross sections:
    n  XLocPercent  YLocPercent  ZLocPercent  shape
    0  0            0            0            point
    1  0.25         0            0            ellipse Ellipse_Height=0.3048 Ellipse_Width=0.12192
    2  0.502451     0            0            as above
    3  0.75         0            0            as above
    4  1            0            0.02         point

Fuselage "BoomOR"
  location (X Y Z) 0.64008 4.24282 -0.318052, rotation 0 0 0
  bounding box size 30 2.70416 3
  Design: Length=3.10896
  cross sections:
    n  XLocPercent  YLocPercent  ZLocPercent  shape
    0  0            0            0            point
    1  0.25         0            0            ellipse Ellipse_Height=0.3048 Ellipse_Width=0.12192
    2  0.502451     0            0            as above
    3  0.75         0            0            as above
    4  1            0            0.02         point

Fuselage "BoomIR"
  location (X Y Z) 0.64008 1.68972 -0.381, rotation 0 0 0
  bounding box size 30 2.70416 3
  Design: Length=5.4864
  cross sections:
    n  XLocPercent  YLocPercent  ZLocPercent  shape
    0  0            0            0            point
    1  0.25         0            0            ellipse Ellipse_Height=0.3048 Ellipse_Width=0.12192
    2  0.284722     0            0            as above
    3  0.75         0            0            ellipse Ellipse_Height=0.356017 Ellipse_Width=0.12192
    4  1            0            0.02         point

Fuselage "BoomMl"
  location (X Y Z) 0.64008 -3.01487 -0.33528, rotation 0 0 0
  bounding box size 30 2.70416 3
  Design: Length=3.10896
  cross sections:
    n  XLocPercent  YLocPercent  ZLocPercent  shape
    0  0            0            0            point
    1  0.25         0            0            ellipse Ellipse_Height=0.3048 Ellipse_Width=0.12192
    2  0.502451     0            0            as above
    3  0.75         0            0            as above
    4  1            0            0.02         point

Fuselage "BoomOl"
  location (X Y Z) 0.64008 -4.24282 -0.318052, rotation 0 0 0
  bounding box size 30 2.70416 3
  Design: Length=3.10896
  cross sections:
    n  XLocPercent  YLocPercent  ZLocPercent  shape
    0  0            0            0            point
    1  0.25         0            0            ellipse Ellipse_Height=0.3048 Ellipse_Width=0.12192
    2  0.502451     0            0            as above
    3  0.75         0            0            as above
    4  1            0            0.02         point

Fuselage "BoomIl"
  location (X Y Z) 0.64008 -1.68972 -0.381, rotation 0 0 0
  bounding box size 30 2.70416 3
  Design: Length=5.4864
  cross sections:
    n  XLocPercent  YLocPercent  ZLocPercent  shape
    0  0            0            0            point
    1  0.25         0            0            ellipse Ellipse_Height=0.3048 Ellipse_Width=0.12192
    2  0.284722     0            0            as above
    3  0.75         0            0            ellipse Ellipse_Height=0.356017 Ellipse_Width=0.12192
    4  1            0            0.02         point
