OpenVSP model (file version 5), 29 components.
Geometry view with OpenVSP parameter names; values to 6 digits, angles in degrees, lengths in the model's unit.
Overall bounding box: X_Min=0 X_Len=31.68 Y_Min=-12.1839 Y_Len=24.3677 Z_Min=-1.86713 Z_Len=9.85825

Fuselage "Fuselage"
  location (X Y Z) 0 0 0, rotation 0 0 0
  bounding box size 31.68 3.01 3.41315
  Design: Length=31.68
  cross sections:
    n  XLocPercent  YLocPercent  ZLocPercent  shape
    0  0            0            0            point
    1  0.15         0            0.03         ellipse Ellipse_Height=3.35 Ellipse_Width=3.01
    2  0.632        0            0.03         as above
    3  1            0            0.06         point

Wing "Wing"
  location (X Y Z) 10.8824 0 -0.5, rotation 0 2.2 0
  symmetric about XZ
  bounding box size 7.94308 24.3677 2.48395
  totals: TotalSpan=26 TotalProjectedSpan=24.3387 TotalChord=2.26288 TotalArea=70.0687 TotalAR=8.45419
  root: chord 5.45, twist 0, NACA 4-series Camber=0 CamberLoc=0.2 ThickChord=0.1
  sections:
    n  Span  Root_Chord  Tip_Chord  Area     Sweep  Sweep_Location  Dihedral  Twist  Twist_Location  tip airfoil
    1  4.9   5.45        2.91364    20.4909  28     0               7         -1     0.25            as above
    2  7.1   2.91364     1          13.8934  28     0               7         -1     0.25            as above
    3  1     1           0.3        0.65     45     0.25            75        0      0.25            as above

Wing "HT"
  location (X Y Z) 26 0 1.9, rotation 0 0 0
  symmetric about XZ
  bounding box size 4.81581 10 0.353605
  totals: TotalSpan=10 TotalProjectedSpan=10 TotalChord=2.325 TotalArea=23.25 TotalAR=4.30108
  root: chord 3.534, twist 0, NACA 4-series Camber=0 CamberLoc=0.2 ThickChord=0.1
  sections:
    n  Span  Root_Chord  Tip_Chord  Area    Sweep  Sweep_Location  Dihedral  Twist  Twist_Location  tip airfoil
    1  5     3.534       1.116      11.625  36.5   0               0         0      0.25            as above

Wing "VT"
  location (X Y Z) 21.9 0 2.36471, rotation 90 0 0
  bounding box size 9.19047 0.773371 5.62641
  totals: TotalSpan=5.62641 TotalProjectedSpan=5.62641 TotalChord=4.40128 TotalArea=19.1982 TotalAR=1.64893
  root: chord 7.72923, twist 0, NACA 4-series Camber=0 CamberLoc=0.2 ThickChord=0.1
  sections:
    n  Span     Root_Chord  Tip_Chord  Area     Sweep  Sweep_Location  Dihedral  Twist  Twist_Location  tip airfoil
    1  1.02641  7.72923     4.18795    6.11595  75     0               0         0      0.25            as above
    2  4.6      4.18795     1.5        13.0823  40     0               0         0      0.25            as above

Custom "Turbofan"
  location (X Y Z) 11.7 4.2 -0.95, rotation 0 0 0
  bounding box size 2.75075 1.80962 1.83427
  Design: Camber=0 CamberLoc=0.2 Chord=2.75075 Height=1.5 InvertFlag=0 Shape=0 ThickChord=0.1125 Width=1.5
  custom script Duct0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

Wing "Turbofan_pylon", child of "Turbofan"
  location (X Y Z) 11.189 4.2 -1.06, rotation 90 0 0; relative location -0.511 0 -0.11, rotation 90 0 0
  bounding box size 3.74451 0.320124 1
  totals: TotalSpan=1 TotalProjectedSpan=1 TotalChord=1.6 TotalArea=1.6 TotalAR=0.625
  root: chord 1.6, twist 0, NACA 4-series Camber=0 CamberLoc=0.2 ThickChord=0.2
  sections:
    n  Span  Root_Chord  Tip_Chord  Area  Sweep  Sweep_Location  Dihedral  Twist  Twist_Location  tip airfoil
    1  1     1.6         1.6        1.6   65     0               0         0      0.25            as above

Fuselage "Spinners", child of "Turbofan"
  location (X Y Z) 10.8304 4.2 -0.95, rotation 0 0 0; relative location -0.869565 0 0, rotation 0 0 0
  symmetric about XZ
  bounding box size 0.3 0.35 0.35
  Design: Length=0.3
  cross sections:
    n  XLocPercent  YLocPercent  ZLocPercent  shape
    0  0            0            0            point
    1  0.51087      0            0            circle Circle_Diameter=0.35
    2  1            0            0            as above
    3  1            0            0            point

Wing "Fan_blade", child of "Turbofan"
  location (X Y Z) 11.01 4.2 -0.85, rotation 90 -20 0; relative location -0.69 0 0.1, rotation 90 -20 0
  15 copies around X
  bounding box size 0.150419 1.47942 1.47885
  totals: TotalSpan=1.24 TotalProjectedSpan=1.24 TotalChord=0.2 TotalArea=0.248 TotalAR=6.2
  root: chord 0.1, twist 0, NACA 4-series Camber=0 CamberLoc=0.2 ThickChord=0.1
  sections:
    n  Span  Root_Chord  Tip_Chord  Area   Sweep     Sweep_Location  Dihedral  Twist  Twist_Location  tip airfoil
    1  0.62  0.1         0.3        0.124  -8.16667  0               0         -40    0.25            NACA 4-series Camber=0 CamberLoc=0.2 ThickChord=0.0416667

Fuselage "Nozzle", child of "Turbofan"
  location (X Y Z) 11.1565 4.2 -0.95, rotation 0 0 0; relative location -0.543478 0 0, rotation 0 0 0
  bounding box size 2.85 1.2 1.2
  Design: Length=2.85
  cross sections:
    n  XLocPercent  YLocPercent  ZLocPercent  shape
    0  0            0            0            circle Circle_Diameter=1
    1  0.538043     0            0            circle Circle_Diameter=1.2
    2  1            0            0            point

Custom "Turbofan"
  location (X Y Z) 11.7 -4.2 -0.95, rotation 0 0 0
  bounding box size 2.75075 1.80962 1.83427
  Design: Camber=0 CamberLoc=0.2 Chord=2.75075 Height=1.5 InvertFlag=0 Shape=0 ThickChord=0.1125 Width=1.5
  custom script Duct0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

Wing "Turbofan_pylon", child of "Turbofan"
  location (X Y Z) 11.1888 -4.2 -1.06, rotation 90 0 0; relative location -0.511204 0 -0.11, rotation 90 0 0
  bounding box size 3.74451 0.320124 1
  totals: TotalSpan=1 TotalProjectedSpan=1 TotalChord=1.6 TotalArea=1.6 TotalAR=0.625
  root: chord 1.6, twist 0, NACA 4-series Camber=0 CamberLoc=0.2 ThickChord=0.2
  sections:
    n  Span  Root_Chord  Tip_Chord  Area  Sweep  Sweep_Location  Dihedral  Twist  Twist_Location  tip airfoil
    1  1     1.6         1.6        1.6   65     0               0         0      0.25            as above

Fuselage "Spinners", child of "Turbofan"
  location (X Y Z) 10.8304 -4.2 -0.95, rotation 0 0 0; relative location -0.869565 0 0, rotation 0 0 0
  symmetric about XZ
  bounding box size 0.3 0.35 0.35
  Design: Length=0.3
  cross sections:
    n  XLocPercent  YLocPercent  ZLocPercent  shape
    0  0            0            0            point
    1  0.51087      0            0            circle Circle_Diameter=0.35
    2  1            0            0            as above
    3  1            0            0            point

Wing "Fan_blade", child of "Turbofan"
  location (X Y Z) 11.01 -4.2 -0.85, rotation 90 -20 0; relative location -0.69 0 0.1, rotation 90 -20 0
  15 copies around X
  bounding box size 0.150419 1.47942 1.47885
  totals: TotalSpan=1.24 TotalProjectedSpan=1.24 TotalChord=0.2 TotalArea=0.248 TotalAR=6.2
  root: chord 0.1, twist 0, NACA 4-series Camber=0 CamberLoc=0.2 ThickChord=0.1
  sections:
    n  Span  Root_Chord  Tip_Chord  Area   Sweep     Sweep_Location  Dihedral  Twist  Twist_Location  tip airfoil
    1  0.62  0.1         0.3        0.124  -8.16667  0               0         -40    0.25            NACA 4-series Camber=0 CamberLoc=0.2 ThickChord=0.0416667

Fuselage "Nozzle", child of "Turbofan"
  location (X Y Z) 11.1565 -4.2 -0.95, rotation 0 0 0; relative location -0.543478 0 0, rotation 0 0 0
  bounding box size 2.85 1.2 1.2
  Design: Length=2.85
  cross sections:
    n  XLocPercent  YLocPercent  ZLocPercent  shape
    0  0            0            0            circle Circle_Diameter=1
    1  0.538043     0            0            circle Circle_Diameter=1.2
    2  1            0            0            point

Wing "Fuel_Tank"
  location (X Y Z) 11.6304 0 -0.62, rotation 0 0 0
  symmetric about XZ
  bounding box size 5.50053 16.8087 1.21393
  totals: TotalSpan=16.9167 TotalProjectedSpan=16.8087 TotalChord=2.29571 TotalArea=40.5047 TotalAR=6.97531
  root: chord 4.01042, twist 0, NACA 4-series Camber=0 CamberLoc=0.2 ThickChord=0.1
  sections:
    n  Span     Root_Chord  Tip_Chord  Area     Sweep    Sweep_Location  Dihedral  Twist  Twist_Location  tip airfoil
    1  4.84896  4.01042     1.92735    14.396   26.5455  0               7.09091   0      0.25            as above
    2  3.60938  1.92735     1.31771    5.85633  26       0               5.54545   0      0.25            as above

Stack "Battery_1"
  location (X Y Z) 16.413 0 0, rotation 0 0 0
  bounding box size 1.33333 2.62842 1.2
  cross sections:
    n  XDelta     YDelta  ZDelta  shape
    0  0          0       0       point
    1  0.0983607  0       0       rounded rectangle RoundRectXSec_KeyCorner=1 RoundRectXSec_Radius=0.2 RoundRectXSec_RadiusBL=1.2 RoundRectXSec_RadiusBR=1.2 RoundRectXSec_RadiusTL=0.2 RoundedRect_Height=1.2 RoundedRect_RadiusSymmetryType=1 RoundedRect_Width=2.6
    2  0.5        0       0       as above
    3  0.5        0       0       as above
    4  0.0901639  0       0       point

Stack "Battery_2"
  location (X Y Z) 17.7174 0 0, rotation 0 0 0
  bounding box size 1.33333 2.62842 1.2
  cross sections:
    n  XDelta     YDelta  ZDelta  shape
    0  0          0       0       point
    1  0.0983607  0       0       rounded rectangle RoundRectXSec_KeyCorner=1 RoundRectXSec_Radius=0.2 RoundRectXSec_RadiusBL=1.2 RoundRectXSec_RadiusBR=1.2 RoundRectXSec_RadiusTL=0.2 RoundedRect_Height=1.2 RoundedRect_RadiusSymmetryType=1 RoundedRect_Width=2.6
    2  0.5        0       0       as above
    3  0.5        0       0       as above
    4  0.0901639  0       0       point

Stack "Battery_3"
  location (X Y Z) 19.0217 0 0, rotation 0 0 0
  bounding box size 1.33333 2.62842 1.2
  cross sections:
    n  XDelta     YDelta  ZDelta  shape
    0  0          0       0       point
    1  0.0983607  0       0       rounded rectangle RoundRectXSec_KeyCorner=1 RoundRectXSec_Radius=0.2 RoundRectXSec_RadiusBL=1.2 RoundRectXSec_RadiusBR=1.2 RoundRectXSec_RadiusTL=0.2 RoundedRect_Height=1.2 RoundedRect_RadiusSymmetryType=1 RoundedRect_Width=2.6
    2  0.5        0       0       as above
    3  0.5        0       0       as above
    4  0.0901639  0       0       point

Stack "HEX"
  location (X Y Z) 20.3261 0 0, rotation 0 0 0
  bounding box size 1.33333 2.62842 1.2
  cross sections:
    n  XDelta     YDelta  ZDelta  shape
    0  0          0       0       point
    1  0.0983607  0       0       rounded rectangle RoundRectXSec_KeyCorner=1 RoundRectXSec_Radius=0.2 RoundRectXSec_RadiusBL=1.2 RoundRectXSec_RadiusBR=1.2 RoundRectXSec_RadiusTL=0.2 RoundedRect_Height=1.2 RoundedRect_RadiusSymmetryType=1 RoundedRect_Width=2.6
    2  0.5        0       0       as above
    3  0.5        0       0       as above
    4  0.0901639  0       0       point

Stack "Energy_Line_1"
  location (X Y Z) 2 0 -0.434783, rotation 0 0 0
  bounding box size 19 0.2 0.2
  cross sections:
    n  XDelta  YDelta  ZDelta  shape
    0  0       0       0       circle Circle_Diameter=0.2
    1  19      0       0       as above

Stack "Energy_Line_1"
  location (X Y Z) 13.6522 0 -0.543478, rotation 6.19565 0 80
  symmetric about XZ
  bounding box size 0.939948 8.42016 0.654624
  cross sections:
    n  XDelta   YDelta  ZDelta  shape
    0  0        0       0       circle Circle_Diameter=0.2
    1  4.27869  0       0       as above

BodyOfRevolution "BORGeom"
  location (X Y Z) 11.4762 4.23 -0.952381, rotation 0 0 0
  symmetric about XZ
  bounding box size 0.954162 9.1024 0.642401
  Design: A0=0.193247 Ae=0.258067 Amin=0.156343 AminW=0.292229 Angle=0 Diameter=0.526316 Mode=0
  profile: rounded rectangle RoundRectXSec_Radius=0.2 RoundedRect_Height=0.0916667 RoundedRect_Width=1.1

Stack "Energy_Line_2"
  location (X Y Z) 12.4565 -4.17348 -0.978261, rotation 0 -25 0
  symmetric about XZ
  bounding box size 2.03086 8.54696 1.08885
  cross sections:
    n  XDelta   YDelta  ZDelta  shape
    0  0        0       0       circle Circle_Diameter=0.2
    1  2.14754  0       0       as above

Stack "HEX_Line"
  location (X Y Z) 16.4783 0.869565 0.543478, rotation 0 0 0
  symmetric about XZ
  bounding box size 4.93443 1.93913 0.2
  cross sections:
    n  XDelta   YDelta  ZDelta  shape
    0  0        0       0       circle Circle_Diameter=0.2
    1  4.93443  0       0       as above

Stack "Battery_4"
  location (X Y Z) 9.56522 0 0, rotation 0 0 0
  bounding box size 1.33333 2.62842 1.2
  cross sections:
    n  XDelta     YDelta  ZDelta  shape
    0  0          0       0       point
    1  0.0983607  0       0       rounded rectangle RoundRectXSec_KeyCorner=1 RoundRectXSec_Radius=0.2 RoundRectXSec_RadiusBL=1.2 RoundRectXSec_RadiusBR=1.2 RoundRectXSec_RadiusTL=0.2 RoundedRect_Height=1.2 RoundedRect_RadiusSymmetryType=1 RoundedRect_Width=2.6
    2  0.5        0       0       as above
    3  0.5        0       0       as above
    4  0.0901639  0       0       point

Stack "Battery_5"
  location (X Y Z) 8.26087 0 0, rotation 0 0 0
  bounding box size 1.33333 2.62842 1.2
  cross sections:
    n  XDelta     YDelta  ZDelta  shape
    0  0          0       0       point
    1  0.0983607  0       0       rounded rectangle RoundRectXSec_KeyCorner=1 RoundRectXSec_Radius=0.2 RoundRectXSec_RadiusBL=1.2 RoundRectXSec_RadiusBR=1.2 RoundRectXSec_RadiusTL=0.2 RoundedRect_Height=1.2 RoundedRect_RadiusSymmetryType=1 RoundedRect_Width=2.6
    2  0.5        0       0       as above
    3  0.5        0       0       as above
    4  0.0901639  0       0       point

Stack "HEX_2"
  location (X Y Z) 6.91274 0 0, rotation 0 0 0
  bounding box size 1.33333 2.62842 1.2
  cross sections:
    n  XDelta     YDelta  ZDelta  shape
    0  0          0       0       point
    1  0.0983607  0       0       rounded rectangle RoundRectXSec_KeyCorner=1 RoundRectXSec_Radius=0.2 RoundRectXSec_RadiusBL=1.2 RoundRectXSec_RadiusBR=1.2 RoundRectXSec_RadiusTL=0.2 RoundedRect_Height=1.2 RoundedRect_RadiusSymmetryType=1 RoundedRect_Width=2.6
    2  0.5        0       0       as above
    3  0.5        0       0       as above
    4  0.0901639  0       0       point

Stack "HEX_Line_2"
  location (X Y Z) 6.91304 0.869565 0.543478, rotation 0 0 0
  symmetric about XZ
  bounding box size 3.70492 1.93913 0.2
  cross sections:
    n  XDelta   YDelta  ZDelta  shape
    0  0        0       0       circle Circle_Diameter=0.2
    1  3.70492  0       0       as above

Box "Box"
  location (X Y Z) 1.90476 0 -0.238095, rotation 0 0 0
  bounding box size 0.500967 0.709292 0.65095
  Design: Height=0.65095 Length=0.500967 SquareFlag=0 Width=0.709292
  custom script Box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
